/batch
!-----------------------------------------------
! Sherlock NF Model.apdl - Generated by Sherlock
!-----------------------------------------------
/UIS,MSGPOP,3                           ! Display message box only for errors
/UIS,REPLOT,0                           ! Disable auto replot
!-----------------------------------------------
! Sherlock/Ansys Model: project cca
!-----------------------------------------------
finish
/clear
/title,Pc7e90b4d
/nopr
!-----------------------------------------------
! Load model from CDB file
!-----------------------------------------------
cdread,db,'C:\Mac\Home\Developer\MIT_Rkt_Team\2026-7\MIT-RT-26_27-Work\simulation_work\avionics\powerboardsim\1\outputs\Sherlock NF Model','cdb'
!-----------------------------------------------
! Enter PreProcessor
!-----------------------------------------------
/prep7
immed,0                                 ! Disable immediate mode graphics
!-----------------------------------------------
! Shape Warnings
!-----------------------------------------------
/nerr,-0
shpp,off,ANGD
shpp,off,ASPECT
shpp,off,PARAL
shpp,off,MAXANG
shpp,off,JACRAT
shpp,off,WARP
/nerr,default
/COM,--------------------------------------------------
/COM,Sherlock Geometry Model
/COM,--------------------------------------------------
! -------------------------------------------------------
! Mesh Type = Bonded
! Modeling Regions = DISABLED
! PCB Model = Uniform
! Element Order = First Order (Linear)
! Max Mesh Size = 1.0 m
! Vertical Mesh Size = 5.0 m
! Quads Preferred = YES
! Max Mesh Size = 2.0 mm
!
! Mount Point Modeling = ENABLED
! Element Order = First Order (Linear)
! Max Mesh Size = 2 mm
! Vertical Mesh Size = 0 mm
!
! Drill Hole Modeling = ENABLED
! Min Hole Diameter = 1 mm
! Max Edge Length = 1 mm
!
! Part Modeling = ENABLED
! Min Part Size = 0.0 m
! Element Order = First Order (Linear)
! Max Mesh Size = 5.0 m
! Vertical Mesh Size = 1.0 m
! Filtered Part Results = DISABLED
!
! Lead Modeling = DISABLED
! Element Order = First Order (Linear)
! Max Mesh Size = 2 mm
! Vertical Mesh Size = 0 mm
!
! Wire Bond Modeling = DISABLED
! Element Order = First Order (Linear)
! Max Segment Length = 2 mm
!
! Heat Sink Modeling = DISABLED
! Element Order = First Order (Linear)
! Max Mesh Size = 2 mm
! Vertical Mesh Size = 0 mm
!
! Potting Regions = DISABLED
! Element Order = First Order (Linear)
! Max Mesh Size = 2 mm
! Vertical Mesh Size = 0 mm
!
! Mechanical Parts = DISABLED
! Element Order = First Order (Linear)
! Max Mesh Size = 2 mm
! Vertical Mesh Size = 0 mm
! -------------------------------------------------------
!-----------------------------------------------
! Disable Numbering
!-----------------------------------------------
/pnum,NODE,0
/pnum,ELEM,0
/pnum,SEC,0
/pnum,MAT,0
/pnum,TYPE,0
/pnum,REAL,0
/pnum,ESYS,0
/pnum,LOC,0
/pnum,KP,0
/pnum,LINE,0
/pnum,AREA,0
/pnum,VOLU,0
/pnum,SVAL,0
/pnum,TABNAM,0
/number,-1
!-----------------------------------------------
! Element Set Pc7e90b4d_PCB
!-----------------------------------------------
cmsel,S,Pc7e90b4d_PCB_MESH_ES           ! Select elements
cm,Pc7e90b4d_PCB_ES,ELEM                ! Define layer elements
/COM,--------------------------------------------------
/COM,Sherlock Bonds
/COM,--------------------------------------------------
/COM,+++ Bond Pc7e90b4d_COMP_Q1
!-----------------------------------------------
! Bond Pc7e90b4d_COMP_Q1
!-----------------------------------------------
cmsel,S,Pc7e90b4d_COMP_Q1_SN            ! Select secondary nodes
cmsel,S,Pc7e90b4d_PCB_ES                ! Select main elements
/nerr,-0
ceintf,0.25,,,,,,,0.02
/nerr,default
/COM,+++ Bond Pc7e90b4d_COMP_C42
!-----------------------------------------------
! Bond Pc7e90b4d_COMP_C42
!-----------------------------------------------
cmsel,S,Pc7e90b4d_COMP_C42_SN           ! Select secondary nodes
cmsel,S,Pc7e90b4d_PCB_ES                ! Select main elements
/nerr,-0
ceintf,0.25,,,,,,,0.02
/nerr,default
/COM,+++ Bond Pc7e90b4d_COMP_Q2
!-----------------------------------------------
! Bond Pc7e90b4d_COMP_Q2
!-----------------------------------------------
cmsel,S,Pc7e90b4d_COMP_Q2_SN            ! Select secondary nodes
cmsel,S,Pc7e90b4d_PCB_ES                ! Select main elements
/nerr,-0
ceintf,0.25,,,,,,,0.02
/nerr,default
/COM,+++ Bond Pc7e90b4d_COMP_C41
!-----------------------------------------------
! Bond Pc7e90b4d_COMP_C41
!-----------------------------------------------
cmsel,S,Pc7e90b4d_COMP_C41_SN           ! Select secondary nodes
cmsel,S,Pc7e90b4d_PCB_ES                ! Select main elements
/nerr,-0
ceintf,0.25,,,,,,,0.02
/nerr,default
/COM,+++ Bond Pc7e90b4d_COMP_Q3
!-----------------------------------------------
! Bond Pc7e90b4d_COMP_Q3
!-----------------------------------------------
cmsel,S,Pc7e90b4d_COMP_Q3_SN            ! Select secondary nodes
cmsel,S,Pc7e90b4d_PCB_ES                ! Select main elements
/nerr,-0
ceintf,0.25,,,,,,,0.02
/nerr,default
/COM,+++ Bond Pc7e90b4d_COMP_C44
!-----------------------------------------------
! Bond Pc7e90b4d_COMP_C44
!-----------------------------------------------
cmsel,S,Pc7e90b4d_COMP_C44_SN           ! Select secondary nodes
cmsel,S,Pc7e90b4d_PCB_ES                ! Select main elements
/nerr,-0
ceintf,0.25,,,,,,,0.02
/nerr,default
/COM,+++ Bond Pc7e90b4d_COMP_Q4
!-----------------------------------------------
! Bond Pc7e90b4d_COMP_Q4
!-----------------------------------------------
cmsel,S,Pc7e90b4d_COMP_Q4_SN            ! Select secondary nodes
cmsel,S,Pc7e90b4d_PCB_ES                ! Select main elements
/nerr,-0
ceintf,0.25,,,,,,,0.02
/nerr,default
/COM,+++ Bond Pc7e90b4d_COMP_C43
!-----------------------------------------------
! Bond Pc7e90b4d_COMP_C43
!-----------------------------------------------
cmsel,S,Pc7e90b4d_COMP_C43_SN           ! Select secondary nodes
cmsel,S,Pc7e90b4d_PCB_ES                ! Select main elements
/nerr,-0
ceintf,0.25,,,,,,,0.02
/nerr,default
/COM,+++ Bond Pc7e90b4d_COMP_C46
!-----------------------------------------------
! Bond Pc7e90b4d_COMP_C46
!-----------------------------------------------
cmsel,S,Pc7e90b4d_COMP_C46_SN           ! Select secondary nodes
cmsel,S,Pc7e90b4d_PCB_ES                ! Select main elements
/nerr,-0
ceintf,0.25,,,,,,,0.02
/nerr,default
/COM,+++ Bond Pc7e90b4d_COMP_C45
!-----------------------------------------------
! Bond Pc7e90b4d_COMP_C45
!-----------------------------------------------
cmsel,S,Pc7e90b4d_COMP_C45_SN           ! Select secondary nodes
cmsel,S,Pc7e90b4d_PCB_ES                ! Select main elements
/nerr,-0
ceintf,0.25,,,,,,,0.02
/nerr,default
/COM,+++ Bond Pc7e90b4d_COMP_C48
!-----------------------------------------------
! Bond Pc7e90b4d_COMP_C48
!-----------------------------------------------
cmsel,S,Pc7e90b4d_COMP_C48_SN           ! Select secondary nodes
cmsel,S,Pc7e90b4d_PCB_ES                ! Select main elements
/nerr,-0
ceintf,0.25,,,,,,,0.02
/nerr,default
/COM,+++ Bond Pc7e90b4d_COMP_C47
!-----------------------------------------------
! Bond Pc7e90b4d_COMP_C47
!-----------------------------------------------
cmsel,S,Pc7e90b4d_COMP_C47_SN           ! Select secondary nodes
cmsel,S,Pc7e90b4d_PCB_ES                ! Select main elements
/nerr,-0
ceintf,0.25,,,,,,,0.02
/nerr,default
/COM,+++ Bond Pc7e90b4d_COMP_C49
!-----------------------------------------------
! Bond Pc7e90b4d_COMP_C49
!-----------------------------------------------
cmsel,S,Pc7e90b4d_COMP_C49_SN           ! Select secondary nodes
cmsel,S,Pc7e90b4d_PCB_ES                ! Select main elements
/nerr,-0
ceintf,0.25,,,,,,,0.02
/nerr,default
/COM,+++ Bond Pc7e90b4d_COMP_R21
!-----------------------------------------------
! Bond Pc7e90b4d_COMP_R21
!-----------------------------------------------
cmsel,S,Pc7e90b4d_COMP_R21_SN           ! Select secondary nodes
cmsel,S,Pc7e90b4d_PCB_ES                ! Select main elements
/nerr,-0
ceintf,0.25,,,,,,,0.02
/nerr,default
/COM,+++ Bond Pc7e90b4d_COMP_R20
!-----------------------------------------------
! Bond Pc7e90b4d_COMP_R20
!-----------------------------------------------
cmsel,S,Pc7e90b4d_COMP_R20_SN           ! Select secondary nodes
cmsel,S,Pc7e90b4d_PCB_ES                ! Select main elements
/nerr,-0
ceintf,0.25,,,,,,,0.02
/nerr,default
/COM,+++ Bond Pc7e90b4d_COMP_R23
!-----------------------------------------------
! Bond Pc7e90b4d_COMP_R23
!-----------------------------------------------
cmsel,S,Pc7e90b4d_COMP_R23_SN           ! Select secondary nodes
cmsel,S,Pc7e90b4d_PCB_ES                ! Select main elements
/nerr,-0
ceintf,0.25,,,,,,,0.02
/nerr,default
/COM,+++ Bond Pc7e90b4d_COMP_R22
!-----------------------------------------------
! Bond Pc7e90b4d_COMP_R22
!-----------------------------------------------
cmsel,S,Pc7e90b4d_COMP_R22_SN           ! Select secondary nodes
cmsel,S,Pc7e90b4d_PCB_ES                ! Select main elements
/nerr,-0
ceintf,0.25,,,,,,,0.02
/nerr,default
/COM,+++ Bond Pc7e90b4d_COMP_R25
!-----------------------------------------------
! Bond Pc7e90b4d_COMP_R25
!-----------------------------------------------
cmsel,S,Pc7e90b4d_COMP_R25_SN           ! Select secondary nodes
cmsel,S,Pc7e90b4d_PCB_ES                ! Select main elements
/nerr,-0
ceintf,0.25,,,,,,,0.02
/nerr,default
/COM,+++ Bond Pc7e90b4d_COMP_R24
!-----------------------------------------------
! Bond Pc7e90b4d_COMP_R24
!-----------------------------------------------
cmsel,S,Pc7e90b4d_COMP_R24_SN           ! Select secondary nodes
cmsel,S,Pc7e90b4d_PCB_ES                ! Select main elements
/nerr,-0
ceintf,0.25,,,,,,,0.02
/nerr,default
/COM,+++ Bond Pc7e90b4d_COMP_R27
!-----------------------------------------------
! Bond Pc7e90b4d_COMP_R27
!-----------------------------------------------
cmsel,S,Pc7e90b4d_COMP_R27_SN           ! Select secondary nodes
cmsel,S,Pc7e90b4d_PCB_ES                ! Select main elements
/nerr,-0
ceintf,0.25,,,,,,,0.02
/nerr,default
/COM,+++ Bond Pc7e90b4d_COMP_R26
!-----------------------------------------------
! Bond Pc7e90b4d_COMP_R26
!-----------------------------------------------
cmsel,S,Pc7e90b4d_COMP_R26_SN           ! Select secondary nodes
cmsel,S,Pc7e90b4d_PCB_ES                ! Select main elements
/nerr,-0
ceintf,0.25,,,,,,,0.02
/nerr,default
/COM,+++ Bond Pc7e90b4d_COMP_R29
!-----------------------------------------------
! Bond Pc7e90b4d_COMP_R29
!-----------------------------------------------
cmsel,S,Pc7e90b4d_COMP_R29_SN           ! Select secondary nodes
cmsel,S,Pc7e90b4d_PCB_ES                ! Select main elements
/nerr,-0
ceintf,0.25,,,,,,,0.02
/nerr,default
/COM,+++ Bond Pc7e90b4d_COMP_R28
!-----------------------------------------------
! Bond Pc7e90b4d_COMP_R28
!-----------------------------------------------
cmsel,S,Pc7e90b4d_COMP_R28_SN           ! Select secondary nodes
cmsel,S,Pc7e90b4d_PCB_ES                ! Select main elements
/nerr,-0
ceintf,0.25,,,,,,,0.02
/nerr,default
/COM,+++ Bond Pc7e90b4d_COMP_C51
!-----------------------------------------------
! Bond Pc7e90b4d_COMP_C51
!-----------------------------------------------
cmsel,S,Pc7e90b4d_COMP_C51_SN           ! Select secondary nodes
cmsel,S,Pc7e90b4d_PCB_ES                ! Select main elements
/nerr,-0
ceintf,0.25,,,,,,,0.02
/nerr,default
/COM,+++ Bond Pc7e90b4d_COMP_R1
!-----------------------------------------------
! Bond Pc7e90b4d_COMP_R1
!-----------------------------------------------
cmsel,S,Pc7e90b4d_COMP_R1_SN            ! Select secondary nodes
cmsel,S,Pc7e90b4d_PCB_ES                ! Select main elements
/nerr,-0
ceintf,0.25,,,,,,,0.02
/nerr,default
/COM,+++ Bond Pc7e90b4d_COMP_C50
!-----------------------------------------------
! Bond Pc7e90b4d_COMP_C50
!-----------------------------------------------
cmsel,S,Pc7e90b4d_COMP_C50_SN           ! Select secondary nodes
cmsel,S,Pc7e90b4d_PCB_ES                ! Select main elements
/nerr,-0
ceintf,0.25,,,,,,,0.02
/nerr,default
/COM,+++ Bond Pc7e90b4d_COMP_R2
!-----------------------------------------------
! Bond Pc7e90b4d_COMP_R2
!-----------------------------------------------
cmsel,S,Pc7e90b4d_COMP_R2_SN            ! Select secondary nodes
cmsel,S,Pc7e90b4d_PCB_ES                ! Select main elements
/nerr,-0
ceintf,0.25,,,,,,,0.02
/nerr,default
/COM,+++ Bond Pc7e90b4d_COMP_C53
!-----------------------------------------------
! Bond Pc7e90b4d_COMP_C53
!-----------------------------------------------
cmsel,S,Pc7e90b4d_COMP_C53_SN           ! Select secondary nodes
cmsel,S,Pc7e90b4d_PCB_ES                ! Select main elements
/nerr,-0
ceintf,0.25,,,,,,,0.02
/nerr,default
/COM,+++ Bond Pc7e90b4d_COMP_R3
!-----------------------------------------------
! Bond Pc7e90b4d_COMP_R3
!-----------------------------------------------
cmsel,S,Pc7e90b4d_COMP_R3_SN            ! Select secondary nodes
cmsel,S,Pc7e90b4d_PCB_ES                ! Select main elements
/nerr,-0
ceintf,0.25,,,,,,,0.02
/nerr,default
/COM,+++ Bond Pc7e90b4d_COMP_C52
!-----------------------------------------------
! Bond Pc7e90b4d_COMP_C52
!-----------------------------------------------
cmsel,S,Pc7e90b4d_COMP_C52_SN           ! Select secondary nodes
cmsel,S,Pc7e90b4d_PCB_ES                ! Select main elements
/nerr,-0
ceintf,0.25,,,,,,,0.02
/nerr,default
/COM,+++ Bond Pc7e90b4d_COMP_R4
!-----------------------------------------------
! Bond Pc7e90b4d_COMP_R4
!-----------------------------------------------
cmsel,S,Pc7e90b4d_COMP_R4_SN            ! Select secondary nodes
cmsel,S,Pc7e90b4d_PCB_ES                ! Select main elements
/nerr,-0
ceintf,0.25,,,,,,,0.02
/nerr,default
/COM,+++ Bond Pc7e90b4d_COMP_C55
!-----------------------------------------------
! Bond Pc7e90b4d_COMP_C55
!-----------------------------------------------
cmsel,S,Pc7e90b4d_COMP_C55_SN           ! Select secondary nodes
cmsel,S,Pc7e90b4d_PCB_ES                ! Select main elements
/nerr,-0
ceintf,0.25,,,,,,,0.02
/nerr,default
/COM,+++ Bond Pc7e90b4d_COMP_R5
!-----------------------------------------------
! Bond Pc7e90b4d_COMP_R5
!-----------------------------------------------
cmsel,S,Pc7e90b4d_COMP_R5_SN            ! Select secondary nodes
cmsel,S,Pc7e90b4d_PCB_ES                ! Select main elements
/nerr,-0
ceintf,0.25,,,,,,,0.02
/nerr,default
/COM,+++ Bond Pc7e90b4d_COMP_C54
!-----------------------------------------------
! Bond Pc7e90b4d_COMP_C54
!-----------------------------------------------
cmsel,S,Pc7e90b4d_COMP_C54_SN           ! Select secondary nodes
cmsel,S,Pc7e90b4d_PCB_ES                ! Select main elements
/nerr,-0
ceintf,0.25,,,,,,,0.02
/nerr,default
/COM,+++ Bond Pc7e90b4d_COMP_R6
!-----------------------------------------------
! Bond Pc7e90b4d_COMP_R6
!-----------------------------------------------
cmsel,S,Pc7e90b4d_COMP_R6_SN            ! Select secondary nodes
cmsel,S,Pc7e90b4d_PCB_ES                ! Select main elements
/nerr,-0
ceintf,0.25,,,,,,,0.02
/nerr,default
/COM,+++ Bond Pc7e90b4d_COMP_C57
!-----------------------------------------------
! Bond Pc7e90b4d_COMP_C57
!-----------------------------------------------
cmsel,S,Pc7e90b4d_COMP_C57_SN           ! Select secondary nodes
cmsel,S,Pc7e90b4d_PCB_ES                ! Select main elements
/nerr,-0
ceintf,0.25,,,,,,,0.02
/nerr,default
/COM,+++ Bond Pc7e90b4d_COMP_R7
!-----------------------------------------------
! Bond Pc7e90b4d_COMP_R7
!-----------------------------------------------
cmsel,S,Pc7e90b4d_COMP_R7_SN            ! Select secondary nodes
cmsel,S,Pc7e90b4d_PCB_ES                ! Select main elements
/nerr,-0
ceintf,0.25,,,,,,,0.02
/nerr,default
/COM,+++ Bond Pc7e90b4d_COMP_C56
!-----------------------------------------------
! Bond Pc7e90b4d_COMP_C56
!-----------------------------------------------
cmsel,S,Pc7e90b4d_COMP_C56_SN           ! Select secondary nodes
cmsel,S,Pc7e90b4d_PCB_ES                ! Select main elements
/nerr,-0
ceintf,0.25,,,,,,,0.02
/nerr,default
/COM,+++ Bond Pc7e90b4d_COMP_R8
!-----------------------------------------------
! Bond Pc7e90b4d_COMP_R8
!-----------------------------------------------
cmsel,S,Pc7e90b4d_COMP_R8_SN            ! Select secondary nodes
cmsel,S,Pc7e90b4d_PCB_ES                ! Select main elements
/nerr,-0
ceintf,0.25,,,,,,,0.02
/nerr,default
/COM,+++ Bond Pc7e90b4d_COMP_C59
!-----------------------------------------------
! Bond Pc7e90b4d_COMP_C59
!-----------------------------------------------
cmsel,S,Pc7e90b4d_COMP_C59_SN           ! Select secondary nodes
cmsel,S,Pc7e90b4d_PCB_ES                ! Select main elements
/nerr,-0
ceintf,0.25,,,,,,,0.02
/nerr,default
/COM,+++ Bond Pc7e90b4d_COMP_R9
!-----------------------------------------------
! Bond Pc7e90b4d_COMP_R9
!-----------------------------------------------
cmsel,S,Pc7e90b4d_COMP_R9_SN            ! Select secondary nodes
cmsel,S,Pc7e90b4d_PCB_ES                ! Select main elements
/nerr,-0
ceintf,0.25,,,,,,,0.02
/nerr,default
/COM,+++ Bond Pc7e90b4d_COMP_J1
!-----------------------------------------------
! Bond Pc7e90b4d_COMP_J1
!-----------------------------------------------
cmsel,S,Pc7e90b4d_COMP_J1_SN            ! Select secondary nodes
cmsel,S,Pc7e90b4d_PCB_ES                ! Select main elements
/nerr,-0
ceintf,0.25,,,,,,,0.02
/nerr,default
/COM,+++ Bond Pc7e90b4d_COMP_C58
!-----------------------------------------------
! Bond Pc7e90b4d_COMP_C58
!-----------------------------------------------
cmsel,S,Pc7e90b4d_COMP_C58_SN           ! Select secondary nodes
cmsel,S,Pc7e90b4d_PCB_ES                ! Select main elements
/nerr,-0
ceintf,0.25,,,,,,,0.02
/nerr,default
/COM,+++ Bond Pc7e90b4d_COMP_J2
!-----------------------------------------------
! Bond Pc7e90b4d_COMP_J2
!-----------------------------------------------
cmsel,S,Pc7e90b4d_COMP_J2_SN            ! Select secondary nodes
cmsel,S,Pc7e90b4d_PCB_ES                ! Select main elements
/nerr,-0
ceintf,0.25,,,,,,,0.02
/nerr,default
/COM,+++ Bond Pc7e90b4d_COMP_J3
!-----------------------------------------------
! Bond Pc7e90b4d_COMP_J3
!-----------------------------------------------
cmsel,S,Pc7e90b4d_COMP_J3_SN            ! Select secondary nodes
cmsel,S,Pc7e90b4d_PCB_ES                ! Select main elements
/nerr,-0
ceintf,0.25,,,,,,,0.02
/nerr,default
/COM,+++ Bond Pc7e90b4d_COMP_J4
!-----------------------------------------------
! Bond Pc7e90b4d_COMP_J4
!-----------------------------------------------
cmsel,S,Pc7e90b4d_COMP_J4_SN            ! Select secondary nodes
cmsel,S,Pc7e90b4d_PCB_ES                ! Select main elements
/nerr,-0
ceintf,0.25,,,,,,,0.02
/nerr,default
/COM,+++ Bond Pc7e90b4d_COMP_J5
!-----------------------------------------------
! Bond Pc7e90b4d_COMP_J5
!-----------------------------------------------
cmsel,S,Pc7e90b4d_COMP_J5_SN            ! Select secondary nodes
cmsel,S,Pc7e90b4d_PCB_ES                ! Select main elements
/nerr,-0
ceintf,0.25,,,,,,,0.02
/nerr,default
/COM,+++ Bond Pc7e90b4d_COMP_J6
!-----------------------------------------------
! Bond Pc7e90b4d_COMP_J6
!-----------------------------------------------
cmsel,S,Pc7e90b4d_COMP_J6_SN            ! Select secondary nodes
cmsel,S,Pc7e90b4d_PCB_ES                ! Select main elements
/nerr,-0
ceintf,0.25,,,,,,,0.02
/nerr,default
/COM,+++ Bond Pc7e90b4d_COMP_R30
!-----------------------------------------------
! Bond Pc7e90b4d_COMP_R30
!-----------------------------------------------
cmsel,S,Pc7e90b4d_COMP_R30_SN           ! Select secondary nodes
cmsel,S,Pc7e90b4d_PCB_ES                ! Select main elements
/nerr,-0
ceintf,0.25,,,,,,,0.02
/nerr,default
/COM,+++ Bond Pc7e90b4d_COMP_R32
!-----------------------------------------------
! Bond Pc7e90b4d_COMP_R32
!-----------------------------------------------
cmsel,S,Pc7e90b4d_COMP_R32_SN           ! Select secondary nodes
cmsel,S,Pc7e90b4d_PCB_ES                ! Select main elements
/nerr,-0
ceintf,0.25,,,,,,,0.02
/nerr,default
/COM,+++ Bond Pc7e90b4d_COMP_R31
!-----------------------------------------------
! Bond Pc7e90b4d_COMP_R31
!-----------------------------------------------
cmsel,S,Pc7e90b4d_COMP_R31_SN           ! Select secondary nodes
cmsel,S,Pc7e90b4d_PCB_ES                ! Select main elements
/nerr,-0
ceintf,0.25,,,,,,,0.02
/nerr,default
/COM,+++ Bond Pc7e90b4d_COMP_R34
!-----------------------------------------------
! Bond Pc7e90b4d_COMP_R34
!-----------------------------------------------
cmsel,S,Pc7e90b4d_COMP_R34_SN           ! Select secondary nodes
cmsel,S,Pc7e90b4d_PCB_ES                ! Select main elements
/nerr,-0
ceintf,0.25,,,,,,,0.02
/nerr,default
/COM,+++ Bond Pc7e90b4d_COMP_R33
!-----------------------------------------------
! Bond Pc7e90b4d_COMP_R33
!-----------------------------------------------
cmsel,S,Pc7e90b4d_COMP_R33_SN           ! Select secondary nodes
cmsel,S,Pc7e90b4d_PCB_ES                ! Select main elements
/nerr,-0
ceintf,0.25,,,,,,,0.02
/nerr,default
/COM,+++ Bond Pc7e90b4d_COMP_RefDes
!-----------------------------------------------
! Bond Pc7e90b4d_COMP_RefDes
!-----------------------------------------------
cmsel,S,Pc7e90b4d_COMP_RefDes_SN        ! Select secondary nodes
cmsel,S,Pc7e90b4d_PCB_ES                ! Select main elements
/nerr,-0
ceintf,0.25,,,,,,,0.02
/nerr,default
/COM,+++ Bond Pc7e90b4d_COMP_R36
!-----------------------------------------------
! Bond Pc7e90b4d_COMP_R36
!-----------------------------------------------
cmsel,S,Pc7e90b4d_COMP_R36_SN           ! Select secondary nodes
cmsel,S,Pc7e90b4d_PCB_ES                ! Select main elements
/nerr,-0
ceintf,0.25,,,,,,,0.02
/nerr,default
/COM,+++ Bond Pc7e90b4d_COMP_R35
!-----------------------------------------------
! Bond Pc7e90b4d_COMP_R35
!-----------------------------------------------
cmsel,S,Pc7e90b4d_COMP_R35_SN           ! Select secondary nodes
cmsel,S,Pc7e90b4d_PCB_ES                ! Select main elements
/nerr,-0
ceintf,0.25,,,,,,,0.02
/nerr,default
/COM,+++ Bond Pc7e90b4d_COMP_R38
!-----------------------------------------------
! Bond Pc7e90b4d_COMP_R38
!-----------------------------------------------
cmsel,S,Pc7e90b4d_COMP_R38_SN           ! Select secondary nodes
cmsel,S,Pc7e90b4d_PCB_ES                ! Select main elements
/nerr,-0
ceintf,0.25,,,,,,,0.02
/nerr,default
/COM,+++ Bond Pc7e90b4d_COMP_R37
!-----------------------------------------------
! Bond Pc7e90b4d_COMP_R37
!-----------------------------------------------
cmsel,S,Pc7e90b4d_COMP_R37_SN           ! Select secondary nodes
cmsel,S,Pc7e90b4d_PCB_ES                ! Select main elements
/nerr,-0
ceintf,0.25,,,,,,,0.02
/nerr,default
/COM,+++ Bond Pc7e90b4d_COMP_R39
!-----------------------------------------------
! Bond Pc7e90b4d_COMP_R39
!-----------------------------------------------
cmsel,S,Pc7e90b4d_COMP_R39_SN           ! Select secondary nodes
cmsel,S,Pc7e90b4d_PCB_ES                ! Select main elements
/nerr,-0
ceintf,0.25,,,,,,,0.02
/nerr,default
/COM,+++ Bond Pc7e90b4d_COMP_C60
!-----------------------------------------------
! Bond Pc7e90b4d_COMP_C60
!-----------------------------------------------
cmsel,S,Pc7e90b4d_COMP_C60_SN           ! Select secondary nodes
cmsel,S,Pc7e90b4d_PCB_ES                ! Select main elements
/nerr,-0
ceintf,0.25,,,,,,,0.02
/nerr,default
/COM,+++ Bond Pc7e90b4d_COMP_C62
!-----------------------------------------------
! Bond Pc7e90b4d_COMP_C62
!-----------------------------------------------
cmsel,S,Pc7e90b4d_COMP_C62_SN           ! Select secondary nodes
cmsel,S,Pc7e90b4d_PCB_ES                ! Select main elements
/nerr,-0
ceintf,0.25,,,,,,,0.02
/nerr,default
/COM,+++ Bond Pc7e90b4d_COMP_C61
!-----------------------------------------------
! Bond Pc7e90b4d_COMP_C61
!-----------------------------------------------
cmsel,S,Pc7e90b4d_COMP_C61_SN           ! Select secondary nodes
cmsel,S,Pc7e90b4d_PCB_ES                ! Select main elements
/nerr,-0
ceintf,0.25,,,,,,,0.02
/nerr,default
/COM,+++ Bond Pc7e90b4d_COMP_C64
!-----------------------------------------------
! Bond Pc7e90b4d_COMP_C64
!-----------------------------------------------
cmsel,S,Pc7e90b4d_COMP_C64_SN           ! Select secondary nodes
cmsel,S,Pc7e90b4d_PCB_ES                ! Select main elements
/nerr,-0
ceintf,0.25,,,,,,,0.02
/nerr,default
/COM,+++ Bond Pc7e90b4d_COMP_C63
!-----------------------------------------------
! Bond Pc7e90b4d_COMP_C63
!-----------------------------------------------
cmsel,S,Pc7e90b4d_COMP_C63_SN           ! Select secondary nodes
cmsel,S,Pc7e90b4d_PCB_ES                ! Select main elements
/nerr,-0
ceintf,0.25,,,,,,,0.02
/nerr,default
/COM,+++ Bond Pc7e90b4d_COMP_C66
!-----------------------------------------------
! Bond Pc7e90b4d_COMP_C66
!-----------------------------------------------
cmsel,S,Pc7e90b4d_COMP_C66_SN           ! Select secondary nodes
cmsel,S,Pc7e90b4d_PCB_ES                ! Select main elements
/nerr,-0
ceintf,0.25,,,,,,,0.02
/nerr,default
/COM,+++ Bond Pc7e90b4d_COMP_C65
!-----------------------------------------------
! Bond Pc7e90b4d_COMP_C65
!-----------------------------------------------
cmsel,S,Pc7e90b4d_COMP_C65_SN           ! Select secondary nodes
cmsel,S,Pc7e90b4d_PCB_ES                ! Select main elements
/nerr,-0
ceintf,0.25,,,,,,,0.02
/nerr,default
/COM,+++ Bond Pc7e90b4d_COMP_C68
!-----------------------------------------------
! Bond Pc7e90b4d_COMP_C68
!-----------------------------------------------
cmsel,S,Pc7e90b4d_COMP_C68_SN           ! Select secondary nodes
cmsel,S,Pc7e90b4d_PCB_ES                ! Select main elements
/nerr,-0
ceintf,0.25,,,,,,,0.02
/nerr,default
/COM,+++ Bond Pc7e90b4d_COMP_C67
!-----------------------------------------------
! Bond Pc7e90b4d_COMP_C67
!-----------------------------------------------
cmsel,S,Pc7e90b4d_COMP_C67_SN           ! Select secondary nodes
cmsel,S,Pc7e90b4d_PCB_ES                ! Select main elements
/nerr,-0
ceintf,0.25,,,,,,,0.02
/nerr,default
/COM,+++ Bond Pc7e90b4d_COMP_C69
!-----------------------------------------------
! Bond Pc7e90b4d_COMP_C69
!-----------------------------------------------
cmsel,S,Pc7e90b4d_COMP_C69_SN           ! Select secondary nodes
cmsel,S,Pc7e90b4d_PCB_ES                ! Select main elements
/nerr,-0
ceintf,0.25,,,,,,,0.02
/nerr,default
/COM,+++ Bond Pc7e90b4d_COMP_R41
!-----------------------------------------------
! Bond Pc7e90b4d_COMP_R41
!-----------------------------------------------
cmsel,S,Pc7e90b4d_COMP_R41_SN           ! Select secondary nodes
cmsel,S,Pc7e90b4d_PCB_ES                ! Select main elements
/nerr,-0
ceintf,0.25,,,,,,,0.02
/nerr,default
/COM,+++ Bond Pc7e90b4d_COMP_C1
!-----------------------------------------------
! Bond Pc7e90b4d_COMP_C1
!-----------------------------------------------
cmsel,S,Pc7e90b4d_COMP_C1_SN            ! Select secondary nodes
cmsel,S,Pc7e90b4d_PCB_ES                ! Select main elements
/nerr,-0
ceintf,0.25,,,,,,,0.02
/nerr,default
/COM,+++ Bond Pc7e90b4d_COMP_R40
!-----------------------------------------------
! Bond Pc7e90b4d_COMP_R40
!-----------------------------------------------
cmsel,S,Pc7e90b4d_COMP_R40_SN           ! Select secondary nodes
cmsel,S,Pc7e90b4d_PCB_ES                ! Select main elements
/nerr,-0
ceintf,0.25,,,,,,,0.02
/nerr,default
/COM,+++ Bond Pc7e90b4d_COMP_C2
!-----------------------------------------------
! Bond Pc7e90b4d_COMP_C2
!-----------------------------------------------
cmsel,S,Pc7e90b4d_COMP_C2_SN            ! Select secondary nodes
cmsel,S,Pc7e90b4d_PCB_ES                ! Select main elements
/nerr,-0
ceintf,0.25,,,,,,,0.02
/nerr,default
/COM,+++ Bond Pc7e90b4d_COMP_R43
!-----------------------------------------------
! Bond Pc7e90b4d_COMP_R43
!-----------------------------------------------
cmsel,S,Pc7e90b4d_COMP_R43_SN           ! Select secondary nodes
cmsel,S,Pc7e90b4d_PCB_ES                ! Select main elements
/nerr,-0
ceintf,0.25,,,,,,,0.02
/nerr,default
/COM,+++ Bond Pc7e90b4d_COMP_C3
!-----------------------------------------------
! Bond Pc7e90b4d_COMP_C3
!-----------------------------------------------
cmsel,S,Pc7e90b4d_COMP_C3_SN            ! Select secondary nodes
cmsel,S,Pc7e90b4d_PCB_ES                ! Select main elements
/nerr,-0
ceintf,0.25,,,,,,,0.02
/nerr,default
/COM,+++ Bond Pc7e90b4d_COMP_R42
!-----------------------------------------------
! Bond Pc7e90b4d_COMP_R42
!-----------------------------------------------
cmsel,S,Pc7e90b4d_COMP_R42_SN           ! Select secondary nodes
cmsel,S,Pc7e90b4d_PCB_ES                ! Select main elements
/nerr,-0
ceintf,0.25,,,,,,,0.02
/nerr,default
/COM,+++ Bond Pc7e90b4d_COMP_C4
!-----------------------------------------------
! Bond Pc7e90b4d_COMP_C4
!-----------------------------------------------
cmsel,S,Pc7e90b4d_COMP_C4_SN            ! Select secondary nodes
cmsel,S,Pc7e90b4d_PCB_ES                ! Select main elements
/nerr,-0
ceintf,0.25,,,,,,,0.02
/nerr,default
/COM,+++ Bond Pc7e90b4d_COMP_R45
!-----------------------------------------------
! Bond Pc7e90b4d_COMP_R45
!-----------------------------------------------
cmsel,S,Pc7e90b4d_COMP_R45_SN           ! Select secondary nodes
cmsel,S,Pc7e90b4d_PCB_ES                ! Select main elements
/nerr,-0
ceintf,0.25,,,,,,,0.02
/nerr,default
/COM,+++ Bond Pc7e90b4d_COMP_C5
!-----------------------------------------------
! Bond Pc7e90b4d_COMP_C5
!-----------------------------------------------
cmsel,S,Pc7e90b4d_COMP_C5_SN            ! Select secondary nodes
cmsel,S,Pc7e90b4d_PCB_ES                ! Select main elements
/nerr,-0
ceintf,0.25,,,,,,,0.02
/nerr,default
/COM,+++ Bond Pc7e90b4d_COMP_R44
!-----------------------------------------------
! Bond Pc7e90b4d_COMP_R44
!-----------------------------------------------
cmsel,S,Pc7e90b4d_COMP_R44_SN           ! Select secondary nodes
cmsel,S,Pc7e90b4d_PCB_ES                ! Select main elements
/nerr,-0
ceintf,0.25,,,,,,,0.02
/nerr,default
/COM,+++ Bond Pc7e90b4d_COMP_C6
!-----------------------------------------------
! Bond Pc7e90b4d_COMP_C6
!-----------------------------------------------
cmsel,S,Pc7e90b4d_COMP_C6_SN            ! Select secondary nodes
cmsel,S,Pc7e90b4d_PCB_ES                ! Select main elements
/nerr,-0
ceintf,0.25,,,,,,,0.02
/nerr,default
/COM,+++ Bond Pc7e90b4d_COMP_R47
!-----------------------------------------------
! Bond Pc7e90b4d_COMP_R47
!-----------------------------------------------
cmsel,S,Pc7e90b4d_COMP_R47_SN           ! Select secondary nodes
cmsel,S,Pc7e90b4d_PCB_ES                ! Select main elements
/nerr,-0
ceintf,0.25,,,,,,,0.02
/nerr,default
/COM,+++ Bond Pc7e90b4d_COMP_C7
!-----------------------------------------------
! Bond Pc7e90b4d_COMP_C7
!-----------------------------------------------
cmsel,S,Pc7e90b4d_COMP_C7_SN            ! Select secondary nodes
cmsel,S,Pc7e90b4d_PCB_ES                ! Select main elements
/nerr,-0
ceintf,0.25,,,,,,,0.02
/nerr,default
/COM,+++ Bond Pc7e90b4d_COMP_R46
!-----------------------------------------------
! Bond Pc7e90b4d_COMP_R46
!-----------------------------------------------
cmsel,S,Pc7e90b4d_COMP_R46_SN           ! Select secondary nodes
cmsel,S,Pc7e90b4d_PCB_ES                ! Select main elements
/nerr,-0
ceintf,0.25,,,,,,,0.02
/nerr,default
/COM,+++ Bond Pc7e90b4d_COMP_C8
!-----------------------------------------------
! Bond Pc7e90b4d_COMP_C8
!-----------------------------------------------
cmsel,S,Pc7e90b4d_COMP_C8_SN            ! Select secondary nodes
cmsel,S,Pc7e90b4d_PCB_ES                ! Select main elements
/nerr,-0
ceintf,0.25,,,,,,,0.02
/nerr,default
/COM,+++ Bond Pc7e90b4d_COMP_R49
!-----------------------------------------------
! Bond Pc7e90b4d_COMP_R49
!-----------------------------------------------
cmsel,S,Pc7e90b4d_COMP_R49_SN           ! Select secondary nodes
cmsel,S,Pc7e90b4d_PCB_ES                ! Select main elements
/nerr,-0
ceintf,0.25,,,,,,,0.02
/nerr,default
/COM,+++ Bond Pc7e90b4d_COMP_IC1
!-----------------------------------------------
! Bond Pc7e90b4d_COMP_IC1
!-----------------------------------------------
cmsel,S,Pc7e90b4d_COMP_IC1_SN           ! Select secondary nodes
cmsel,S,Pc7e90b4d_PCB_ES                ! Select main elements
/nerr,-0
ceintf,0.25,,,,,,,0.02
/nerr,default
/COM,+++ Bond Pc7e90b4d_COMP_C9
!-----------------------------------------------
! Bond Pc7e90b4d_COMP_C9
!-----------------------------------------------
cmsel,S,Pc7e90b4d_COMP_C9_SN            ! Select secondary nodes
cmsel,S,Pc7e90b4d_PCB_ES                ! Select main elements
/nerr,-0
ceintf,0.25,,,,,,,0.02
/nerr,default
/COM,+++ Bond Pc7e90b4d_COMP_R48
!-----------------------------------------------
! Bond Pc7e90b4d_COMP_R48
!-----------------------------------------------
cmsel,S,Pc7e90b4d_COMP_R48_SN           ! Select secondary nodes
cmsel,S,Pc7e90b4d_PCB_ES                ! Select main elements
/nerr,-0
ceintf,0.25,,,,,,,0.02
/nerr,default
/COM,+++ Bond Pc7e90b4d_COMP_IC3
!-----------------------------------------------
! Bond Pc7e90b4d_COMP_IC3
!-----------------------------------------------
cmsel,S,Pc7e90b4d_COMP_IC3_SN           ! Select secondary nodes
cmsel,S,Pc7e90b4d_PCB_ES                ! Select main elements
/nerr,-0
ceintf,0.25,,,,,,,0.02
/nerr,default
/COM,+++ Bond Pc7e90b4d_COMP_IC2
!-----------------------------------------------
! Bond Pc7e90b4d_COMP_IC2
!-----------------------------------------------
cmsel,S,Pc7e90b4d_COMP_IC2_SN           ! Select secondary nodes
cmsel,S,Pc7e90b4d_PCB_ES                ! Select main elements
/nerr,-0
ceintf,0.25,,,,,,,0.02
/nerr,default
/COM,+++ Bond Pc7e90b4d_COMP_IC5
!-----------------------------------------------
! Bond Pc7e90b4d_COMP_IC5
!-----------------------------------------------
cmsel,S,Pc7e90b4d_COMP_IC5_SN           ! Select secondary nodes
cmsel,S,Pc7e90b4d_PCB_ES                ! Select main elements
/nerr,-0
ceintf,0.25,,,,,,,0.02
/nerr,default
/COM,+++ Bond Pc7e90b4d_COMP_IC4
!-----------------------------------------------
! Bond Pc7e90b4d_COMP_IC4
!-----------------------------------------------
cmsel,S,Pc7e90b4d_COMP_IC4_SN           ! Select secondary nodes
cmsel,S,Pc7e90b4d_PCB_ES                ! Select main elements
/nerr,-0
ceintf,0.25,,,,,,,0.02
/nerr,default
/COM,+++ Bond Pc7e90b4d_COMP_IC7
!-----------------------------------------------
! Bond Pc7e90b4d_COMP_IC7
!-----------------------------------------------
cmsel,S,Pc7e90b4d_COMP_IC7_SN           ! Select secondary nodes
cmsel,S,Pc7e90b4d_PCB_ES                ! Select main elements
/nerr,-0
ceintf,0.25,,,,,,,0.02
/nerr,default
/COM,+++ Bond Pc7e90b4d_COMP_C71
!-----------------------------------------------
! Bond Pc7e90b4d_COMP_C71
!-----------------------------------------------
cmsel,S,Pc7e90b4d_COMP_C71_SN           ! Select secondary nodes
cmsel,S,Pc7e90b4d_PCB_ES                ! Select main elements
/nerr,-0
ceintf,0.25,,,,,,,0.02
/nerr,default
/COM,+++ Bond Pc7e90b4d_COMP_C70
!-----------------------------------------------
! Bond Pc7e90b4d_COMP_C70
!-----------------------------------------------
cmsel,S,Pc7e90b4d_COMP_C70_SN           ! Select secondary nodes
cmsel,S,Pc7e90b4d_PCB_ES                ! Select main elements
/nerr,-0
ceintf,0.25,,,,,,,0.02
/nerr,default
/COM,+++ Bond Pc7e90b4d_COMP_IC9
!-----------------------------------------------
! Bond Pc7e90b4d_COMP_IC9
!-----------------------------------------------
cmsel,S,Pc7e90b4d_COMP_IC9_SN           ! Select secondary nodes
cmsel,S,Pc7e90b4d_PCB_ES                ! Select main elements
/nerr,-0
ceintf,0.25,,,,,,,0.02
/nerr,default
/COM,+++ Bond Pc7e90b4d_COMP_C73
!-----------------------------------------------
! Bond Pc7e90b4d_COMP_C73
!-----------------------------------------------
cmsel,S,Pc7e90b4d_COMP_C73_SN           ! Select secondary nodes
cmsel,S,Pc7e90b4d_PCB_ES                ! Select main elements
/nerr,-0
ceintf,0.25,,,,,,,0.02
/nerr,default
/COM,+++ Bond Pc7e90b4d_COMP_IC8
!-----------------------------------------------
! Bond Pc7e90b4d_COMP_IC8
!-----------------------------------------------
cmsel,S,Pc7e90b4d_COMP_IC8_SN           ! Select secondary nodes
cmsel,S,Pc7e90b4d_PCB_ES                ! Select main elements
/nerr,-0
ceintf,0.25,,,,,,,0.02
/nerr,default
/COM,+++ Bond Pc7e90b4d_COMP_C72
!-----------------------------------------------
! Bond Pc7e90b4d_COMP_C72
!-----------------------------------------------
cmsel,S,Pc7e90b4d_COMP_C72_SN           ! Select secondary nodes
cmsel,S,Pc7e90b4d_PCB_ES                ! Select main elements
/nerr,-0
ceintf,0.25,,,,,,,0.02
/nerr,default
/COM,+++ Bond Pc7e90b4d_COMP_C74
!-----------------------------------------------
! Bond Pc7e90b4d_COMP_C74
!-----------------------------------------------
cmsel,S,Pc7e90b4d_COMP_C74_SN           ! Select secondary nodes
cmsel,S,Pc7e90b4d_PCB_ES                ! Select main elements
/nerr,-0
ceintf,0.25,,,,,,,0.02
/nerr,default
/COM,+++ Bond Pc7e90b4d_COMP_D10
!-----------------------------------------------
! Bond Pc7e90b4d_COMP_D10
!-----------------------------------------------
cmsel,S,Pc7e90b4d_COMP_D10_SN           ! Select secondary nodes
cmsel,S,Pc7e90b4d_PCB_ES                ! Select main elements
/nerr,-0
ceintf,0.25,,,,,,,0.02
/nerr,default
/COM,+++ Bond Pc7e90b4d_COMP_L1
!-----------------------------------------------
! Bond Pc7e90b4d_COMP_L1
!-----------------------------------------------
cmsel,S,Pc7e90b4d_COMP_L1_SN            ! Select secondary nodes
cmsel,S,Pc7e90b4d_PCB_ES                ! Select main elements
/nerr,-0
ceintf,0.25,,,,,,,0.02
/nerr,default
/COM,+++ Bond Pc7e90b4d_COMP_L2
!-----------------------------------------------
! Bond Pc7e90b4d_COMP_L2
!-----------------------------------------------
cmsel,S,Pc7e90b4d_COMP_L2_SN            ! Select secondary nodes
cmsel,S,Pc7e90b4d_PCB_ES                ! Select main elements
/nerr,-0
ceintf,0.25,,,,,,,0.02
/nerr,default
/COM,+++ Bond Pc7e90b4d_COMP_L3
!-----------------------------------------------
! Bond Pc7e90b4d_COMP_L3
!-----------------------------------------------
cmsel,S,Pc7e90b4d_COMP_L3_SN            ! Select secondary nodes
cmsel,S,Pc7e90b4d_PCB_ES                ! Select main elements
/nerr,-0
ceintf,0.25,,,,,,,0.02
/nerr,default
/COM,+++ Bond Pc7e90b4d_COMP_L4
!-----------------------------------------------
! Bond Pc7e90b4d_COMP_L4
!-----------------------------------------------
cmsel,S,Pc7e90b4d_COMP_L4_SN            ! Select secondary nodes
cmsel,S,Pc7e90b4d_PCB_ES                ! Select main elements
/nerr,-0
ceintf,0.25,,,,,,,0.02
/nerr,default
/COM,+++ Bond Pc7e90b4d_COMP_L5
!-----------------------------------------------
! Bond Pc7e90b4d_COMP_L5
!-----------------------------------------------
cmsel,S,Pc7e90b4d_COMP_L5_SN            ! Select secondary nodes
cmsel,S,Pc7e90b4d_PCB_ES                ! Select main elements
/nerr,-0
ceintf,0.25,,,,,,,0.02
/nerr,default
/COM,+++ Bond Pc7e90b4d_COMP_L6
!-----------------------------------------------
! Bond Pc7e90b4d_COMP_L6
!-----------------------------------------------
cmsel,S,Pc7e90b4d_COMP_L6_SN            ! Select secondary nodes
cmsel,S,Pc7e90b4d_PCB_ES                ! Select main elements
/nerr,-0
ceintf,0.25,,,,,,,0.02
/nerr,default
/COM,+++ Bond Pc7e90b4d_COMP_R50
!-----------------------------------------------
! Bond Pc7e90b4d_COMP_R50
!-----------------------------------------------
cmsel,S,Pc7e90b4d_COMP_R50_SN           ! Select secondary nodes
cmsel,S,Pc7e90b4d_PCB_ES                ! Select main elements
/nerr,-0
ceintf,0.25,,,,,,,0.02
/nerr,default
/COM,+++ Bond Pc7e90b4d_COMP_D1
!-----------------------------------------------
! Bond Pc7e90b4d_COMP_D1
!-----------------------------------------------
cmsel,S,Pc7e90b4d_COMP_D1_SN            ! Select secondary nodes
cmsel,S,Pc7e90b4d_PCB_ES                ! Select main elements
/nerr,-0
ceintf,0.25,,,,,,,0.02
/nerr,default
/COM,+++ Bond Pc7e90b4d_COMP_R52
!-----------------------------------------------
! Bond Pc7e90b4d_COMP_R52
!-----------------------------------------------
cmsel,S,Pc7e90b4d_COMP_R52_SN           ! Select secondary nodes
cmsel,S,Pc7e90b4d_PCB_ES                ! Select main elements
/nerr,-0
ceintf,0.25,,,,,,,0.02
/nerr,default
/COM,+++ Bond Pc7e90b4d_COMP_D2
!-----------------------------------------------
! Bond Pc7e90b4d_COMP_D2
!-----------------------------------------------
cmsel,S,Pc7e90b4d_COMP_D2_SN            ! Select secondary nodes
cmsel,S,Pc7e90b4d_PCB_ES                ! Select main elements
/nerr,-0
ceintf,0.25,,,,,,,0.02
/nerr,default
/COM,+++ Bond Pc7e90b4d_COMP_R51
!-----------------------------------------------
! Bond Pc7e90b4d_COMP_R51
!-----------------------------------------------
cmsel,S,Pc7e90b4d_COMP_R51_SN           ! Select secondary nodes
cmsel,S,Pc7e90b4d_PCB_ES                ! Select main elements
/nerr,-0
ceintf,0.25,,,,,,,0.02
/nerr,default
/COM,+++ Bond Pc7e90b4d_COMP_D3
!-----------------------------------------------
! Bond Pc7e90b4d_COMP_D3
!-----------------------------------------------
cmsel,S,Pc7e90b4d_COMP_D3_SN            ! Select secondary nodes
cmsel,S,Pc7e90b4d_PCB_ES                ! Select main elements
/nerr,-0
ceintf,0.25,,,,,,,0.02
/nerr,default
/COM,+++ Bond Pc7e90b4d_COMP_R54
!-----------------------------------------------
! Bond Pc7e90b4d_COMP_R54
!-----------------------------------------------
cmsel,S,Pc7e90b4d_COMP_R54_SN           ! Select secondary nodes
cmsel,S,Pc7e90b4d_PCB_ES                ! Select main elements
/nerr,-0
ceintf,0.25,,,,,,,0.02
/nerr,default
/COM,+++ Bond Pc7e90b4d_COMP_D4
!-----------------------------------------------
! Bond Pc7e90b4d_COMP_D4
!-----------------------------------------------
cmsel,S,Pc7e90b4d_COMP_D4_SN            ! Select secondary nodes
cmsel,S,Pc7e90b4d_PCB_ES                ! Select main elements
/nerr,-0
ceintf,0.25,,,,,,,0.02
/nerr,default
/COM,+++ Bond Pc7e90b4d_COMP_R53
!-----------------------------------------------
! Bond Pc7e90b4d_COMP_R53
!-----------------------------------------------
cmsel,S,Pc7e90b4d_COMP_R53_SN           ! Select secondary nodes
cmsel,S,Pc7e90b4d_PCB_ES                ! Select main elements
/nerr,-0
ceintf,0.25,,,,,,,0.02
/nerr,default
/COM,+++ Bond Pc7e90b4d_COMP_D5
!-----------------------------------------------
! Bond Pc7e90b4d_COMP_D5
!-----------------------------------------------
cmsel,S,Pc7e90b4d_COMP_D5_SN            ! Select secondary nodes
cmsel,S,Pc7e90b4d_PCB_ES                ! Select main elements
/nerr,-0
ceintf,0.25,,,,,,,0.02
/nerr,default
/COM,+++ Bond Pc7e90b4d_COMP_R56
!-----------------------------------------------
! Bond Pc7e90b4d_COMP_R56
!-----------------------------------------------
cmsel,S,Pc7e90b4d_COMP_R56_SN           ! Select secondary nodes
cmsel,S,Pc7e90b4d_PCB_ES                ! Select main elements
/nerr,-0
ceintf,0.25,,,,,,,0.02
/nerr,default
/COM,+++ Bond Pc7e90b4d_COMP_D6
!-----------------------------------------------
! Bond Pc7e90b4d_COMP_D6
!-----------------------------------------------
cmsel,S,Pc7e90b4d_COMP_D6_SN            ! Select secondary nodes
cmsel,S,Pc7e90b4d_PCB_ES                ! Select main elements
/nerr,-0
ceintf,0.25,,,,,,,0.02
/nerr,default
/COM,+++ Bond Pc7e90b4d_COMP_R55
!-----------------------------------------------
! Bond Pc7e90b4d_COMP_R55
!-----------------------------------------------
cmsel,S,Pc7e90b4d_COMP_R55_SN           ! Select secondary nodes
cmsel,S,Pc7e90b4d_PCB_ES                ! Select main elements
/nerr,-0
ceintf,0.25,,,,,,,0.02
/nerr,default
/COM,+++ Bond Pc7e90b4d_COMP_D7
!-----------------------------------------------
! Bond Pc7e90b4d_COMP_D7
!-----------------------------------------------
cmsel,S,Pc7e90b4d_COMP_D7_SN            ! Select secondary nodes
cmsel,S,Pc7e90b4d_PCB_ES                ! Select main elements
/nerr,-0
ceintf,0.25,,,,,,,0.02
/nerr,default
/COM,+++ Bond Pc7e90b4d_COMP_D8
!-----------------------------------------------
! Bond Pc7e90b4d_COMP_D8
!-----------------------------------------------
cmsel,S,Pc7e90b4d_COMP_D8_SN            ! Select secondary nodes
cmsel,S,Pc7e90b4d_PCB_ES                ! Select main elements
/nerr,-0
ceintf,0.25,,,,,,,0.02
/nerr,default
/COM,+++ Bond Pc7e90b4d_COMP_D9
!-----------------------------------------------
! Bond Pc7e90b4d_COMP_D9
!-----------------------------------------------
cmsel,S,Pc7e90b4d_COMP_D9_SN            ! Select secondary nodes
cmsel,S,Pc7e90b4d_PCB_ES                ! Select main elements
/nerr,-0
ceintf,0.25,,,,,,,0.02
/nerr,default
/COM,+++ Bond Pc7e90b4d_COMP_U1
!-----------------------------------------------
! Bond Pc7e90b4d_COMP_U1
!-----------------------------------------------
cmsel,S,Pc7e90b4d_COMP_U1_SN            ! Select secondary nodes
cmsel,S,Pc7e90b4d_PCB_ES                ! Select main elements
/nerr,-0
ceintf,0.25,,,,,,,0.02
/nerr,default
/COM,+++ Bond Pc7e90b4d_COMP_IC11
!-----------------------------------------------
! Bond Pc7e90b4d_COMP_IC11
!-----------------------------------------------
cmsel,S,Pc7e90b4d_COMP_IC11_SN          ! Select secondary nodes
cmsel,S,Pc7e90b4d_PCB_ES                ! Select main elements
/nerr,-0
ceintf,0.25,,,,,,,0.02
/nerr,default
/COM,+++ Bond Pc7e90b4d_COMP_IC12
!-----------------------------------------------
! Bond Pc7e90b4d_COMP_IC12
!-----------------------------------------------
cmsel,S,Pc7e90b4d_COMP_IC12_SN          ! Select secondary nodes
cmsel,S,Pc7e90b4d_PCB_ES                ! Select main elements
/nerr,-0
ceintf,0.25,,,,,,,0.02
/nerr,default
/COM,+++ Bond Pc7e90b4d_COMP_IC10
!-----------------------------------------------
! Bond Pc7e90b4d_COMP_IC10
!-----------------------------------------------
cmsel,S,Pc7e90b4d_COMP_IC10_SN          ! Select secondary nodes
cmsel,S,Pc7e90b4d_PCB_ES                ! Select main elements
/nerr,-0
ceintf,0.25,,,,,,,0.02
/nerr,default
/COM,+++ Bond Pc7e90b4d_COMP_IC15
!-----------------------------------------------
! Bond Pc7e90b4d_COMP_IC15
!-----------------------------------------------
cmsel,S,Pc7e90b4d_COMP_IC15_SN          ! Select secondary nodes
cmsel,S,Pc7e90b4d_PCB_ES                ! Select main elements
/nerr,-0
ceintf,0.25,,,,,,,0.02
/nerr,default
/COM,+++ Bond Pc7e90b4d_COMP_IC13
!-----------------------------------------------
! Bond Pc7e90b4d_COMP_IC13
!-----------------------------------------------
cmsel,S,Pc7e90b4d_COMP_IC13_SN          ! Select secondary nodes
cmsel,S,Pc7e90b4d_PCB_ES                ! Select main elements
/nerr,-0
ceintf,0.25,,,,,,,0.02
/nerr,default
/COM,+++ Bond Pc7e90b4d_COMP_IC14
!-----------------------------------------------
! Bond Pc7e90b4d_COMP_IC14
!-----------------------------------------------
cmsel,S,Pc7e90b4d_COMP_IC14_SN          ! Select secondary nodes
cmsel,S,Pc7e90b4d_PCB_ES                ! Select main elements
/nerr,-0
ceintf,0.25,,,,,,,0.02
/nerr,default
/COM,+++ Bond Pc7e90b4d_COMP_C11
!-----------------------------------------------
! Bond Pc7e90b4d_COMP_C11
!-----------------------------------------------
cmsel,S,Pc7e90b4d_COMP_C11_SN           ! Select secondary nodes
cmsel,S,Pc7e90b4d_PCB_ES                ! Select main elements
/nerr,-0
ceintf,0.25,,,,,,,0.02
/nerr,default
/COM,+++ Bond Pc7e90b4d_COMP_C10
!-----------------------------------------------
! Bond Pc7e90b4d_COMP_C10
!-----------------------------------------------
cmsel,S,Pc7e90b4d_COMP_C10_SN           ! Select secondary nodes
cmsel,S,Pc7e90b4d_PCB_ES                ! Select main elements
/nerr,-0
ceintf,0.25,,,,,,,0.02
/nerr,default
/COM,+++ Bond Pc7e90b4d_COMP_C13
!-----------------------------------------------
! Bond Pc7e90b4d_COMP_C13
!-----------------------------------------------
cmsel,S,Pc7e90b4d_COMP_C13_SN           ! Select secondary nodes
cmsel,S,Pc7e90b4d_PCB_ES                ! Select main elements
/nerr,-0
ceintf,0.25,,,,,,,0.02
/nerr,default
/COM,+++ Bond Pc7e90b4d_COMP_C12
!-----------------------------------------------
! Bond Pc7e90b4d_COMP_C12
!-----------------------------------------------
cmsel,S,Pc7e90b4d_COMP_C12_SN           ! Select secondary nodes
cmsel,S,Pc7e90b4d_PCB_ES                ! Select main elements
/nerr,-0
ceintf,0.25,,,,,,,0.02
/nerr,default
/COM,+++ Bond Pc7e90b4d_COMP_C15
!-----------------------------------------------
! Bond Pc7e90b4d_COMP_C15
!-----------------------------------------------
cmsel,S,Pc7e90b4d_COMP_C15_SN           ! Select secondary nodes
cmsel,S,Pc7e90b4d_PCB_ES                ! Select main elements
/nerr,-0
ceintf,0.25,,,,,,,0.02
/nerr,default
/COM,+++ Bond Pc7e90b4d_COMP_C14
!-----------------------------------------------
! Bond Pc7e90b4d_COMP_C14
!-----------------------------------------------
cmsel,S,Pc7e90b4d_COMP_C14_SN           ! Select secondary nodes
cmsel,S,Pc7e90b4d_PCB_ES                ! Select main elements
/nerr,-0
ceintf,0.25,,,,,,,0.02
/nerr,default
/COM,+++ Bond Pc7e90b4d_COMP_C17
!-----------------------------------------------
! Bond Pc7e90b4d_COMP_C17
!-----------------------------------------------
cmsel,S,Pc7e90b4d_COMP_C17_SN           ! Select secondary nodes
cmsel,S,Pc7e90b4d_PCB_ES                ! Select main elements
/nerr,-0
ceintf,0.25,,,,,,,0.02
/nerr,default
/COM,+++ Bond Pc7e90b4d_COMP_C16
!-----------------------------------------------
! Bond Pc7e90b4d_COMP_C16
!-----------------------------------------------
cmsel,S,Pc7e90b4d_COMP_C16_SN           ! Select secondary nodes
cmsel,S,Pc7e90b4d_PCB_ES                ! Select main elements
/nerr,-0
ceintf,0.25,,,,,,,0.02
/nerr,default
/COM,+++ Bond Pc7e90b4d_COMP_C19
!-----------------------------------------------
! Bond Pc7e90b4d_COMP_C19
!-----------------------------------------------
cmsel,S,Pc7e90b4d_COMP_C19_SN           ! Select secondary nodes
cmsel,S,Pc7e90b4d_PCB_ES                ! Select main elements
/nerr,-0
ceintf,0.25,,,,,,,0.02
/nerr,default
/COM,+++ Bond Pc7e90b4d_COMP_C18
!-----------------------------------------------
! Bond Pc7e90b4d_COMP_C18
!-----------------------------------------------
cmsel,S,Pc7e90b4d_COMP_C18_SN           ! Select secondary nodes
cmsel,S,Pc7e90b4d_PCB_ES                ! Select main elements
/nerr,-0
ceintf,0.25,,,,,,,0.02
/nerr,default
/COM,+++ Bond Pc7e90b4d_COMP_C20
!-----------------------------------------------
! Bond Pc7e90b4d_COMP_C20
!-----------------------------------------------
cmsel,S,Pc7e90b4d_COMP_C20_SN           ! Select secondary nodes
cmsel,S,Pc7e90b4d_PCB_ES                ! Select main elements
/nerr,-0
ceintf,0.25,,,,,,,0.02
/nerr,default
/COM,+++ Bond Pc7e90b4d_COMP_C22
!-----------------------------------------------
! Bond Pc7e90b4d_COMP_C22
!-----------------------------------------------
cmsel,S,Pc7e90b4d_COMP_C22_SN           ! Select secondary nodes
cmsel,S,Pc7e90b4d_PCB_ES                ! Select main elements
/nerr,-0
ceintf,0.25,,,,,,,0.02
/nerr,default
/COM,+++ Bond Pc7e90b4d_COMP_C21
!-----------------------------------------------
! Bond Pc7e90b4d_COMP_C21
!-----------------------------------------------
cmsel,S,Pc7e90b4d_COMP_C21_SN           ! Select secondary nodes
cmsel,S,Pc7e90b4d_PCB_ES                ! Select main elements
/nerr,-0
ceintf,0.25,,,,,,,0.02
/nerr,default
/COM,+++ Bond Pc7e90b4d_COMP_C24
!-----------------------------------------------
! Bond Pc7e90b4d_COMP_C24
!-----------------------------------------------
cmsel,S,Pc7e90b4d_COMP_C24_SN           ! Select secondary nodes
cmsel,S,Pc7e90b4d_PCB_ES                ! Select main elements
/nerr,-0
ceintf,0.25,,,,,,,0.02
/nerr,default
/COM,+++ Bond Pc7e90b4d_COMP_C23
!-----------------------------------------------
! Bond Pc7e90b4d_COMP_C23
!-----------------------------------------------
cmsel,S,Pc7e90b4d_COMP_C23_SN           ! Select secondary nodes
cmsel,S,Pc7e90b4d_PCB_ES                ! Select main elements
/nerr,-0
ceintf,0.25,,,,,,,0.02
/nerr,default
/COM,+++ Bond Pc7e90b4d_COMP_C26
!-----------------------------------------------
! Bond Pc7e90b4d_COMP_C26
!-----------------------------------------------
cmsel,S,Pc7e90b4d_COMP_C26_SN           ! Select secondary nodes
cmsel,S,Pc7e90b4d_PCB_ES                ! Select main elements
/nerr,-0
ceintf,0.25,,,,,,,0.02
/nerr,default
/COM,+++ Bond Pc7e90b4d_COMP_C25
!-----------------------------------------------
! Bond Pc7e90b4d_COMP_C25
!-----------------------------------------------
cmsel,S,Pc7e90b4d_COMP_C25_SN           ! Select secondary nodes
cmsel,S,Pc7e90b4d_PCB_ES                ! Select main elements
/nerr,-0
ceintf,0.25,,,,,,,0.02
/nerr,default
/COM,+++ Bond Pc7e90b4d_COMP_C28
!-----------------------------------------------
! Bond Pc7e90b4d_COMP_C28
!-----------------------------------------------
cmsel,S,Pc7e90b4d_COMP_C28_SN           ! Select secondary nodes
cmsel,S,Pc7e90b4d_PCB_ES                ! Select main elements
/nerr,-0
ceintf,0.25,,,,,,,0.02
/nerr,default
/COM,+++ Bond Pc7e90b4d_COMP_C27
!-----------------------------------------------
! Bond Pc7e90b4d_COMP_C27
!-----------------------------------------------
cmsel,S,Pc7e90b4d_COMP_C27_SN           ! Select secondary nodes
cmsel,S,Pc7e90b4d_PCB_ES                ! Select main elements
/nerr,-0
ceintf,0.25,,,,,,,0.02
/nerr,default
/COM,+++ Bond Pc7e90b4d_COMP_C29
!-----------------------------------------------
! Bond Pc7e90b4d_COMP_C29
!-----------------------------------------------
cmsel,S,Pc7e90b4d_COMP_C29_SN           ! Select secondary nodes
cmsel,S,Pc7e90b4d_PCB_ES                ! Select main elements
/nerr,-0
ceintf,0.25,,,,,,,0.02
/nerr,default
/COM,+++ Bond Pc7e90b4d_COMP_C31
!-----------------------------------------------
! Bond Pc7e90b4d_COMP_C31
!-----------------------------------------------
cmsel,S,Pc7e90b4d_COMP_C31_SN           ! Select secondary nodes
cmsel,S,Pc7e90b4d_PCB_ES                ! Select main elements
/nerr,-0
ceintf,0.25,,,,,,,0.02
/nerr,default
/COM,+++ Bond Pc7e90b4d_COMP_C30
!-----------------------------------------------
! Bond Pc7e90b4d_COMP_C30
!-----------------------------------------------
cmsel,S,Pc7e90b4d_COMP_C30_SN           ! Select secondary nodes
cmsel,S,Pc7e90b4d_PCB_ES                ! Select main elements
/nerr,-0
ceintf,0.25,,,,,,,0.02
/nerr,default
/COM,+++ Bond Pc7e90b4d_COMP_C33
!-----------------------------------------------
! Bond Pc7e90b4d_COMP_C33
!-----------------------------------------------
cmsel,S,Pc7e90b4d_COMP_C33_SN           ! Select secondary nodes
cmsel,S,Pc7e90b4d_PCB_ES                ! Select main elements
/nerr,-0
ceintf,0.25,,,,,,,0.02
/nerr,default
/COM,+++ Bond Pc7e90b4d_COMP_C32
!-----------------------------------------------
! Bond Pc7e90b4d_COMP_C32
!-----------------------------------------------
cmsel,S,Pc7e90b4d_COMP_C32_SN           ! Select secondary nodes
cmsel,S,Pc7e90b4d_PCB_ES                ! Select main elements
/nerr,-0
ceintf,0.25,,,,,,,0.02
/nerr,default
/COM,+++ Bond Pc7e90b4d_COMP_C35
!-----------------------------------------------
! Bond Pc7e90b4d_COMP_C35
!-----------------------------------------------
cmsel,S,Pc7e90b4d_COMP_C35_SN           ! Select secondary nodes
cmsel,S,Pc7e90b4d_PCB_ES                ! Select main elements
/nerr,-0
ceintf,0.25,,,,,,,0.02
/nerr,default
/COM,+++ Bond Pc7e90b4d_COMP_C34
!-----------------------------------------------
! Bond Pc7e90b4d_COMP_C34
!-----------------------------------------------
cmsel,S,Pc7e90b4d_COMP_C34_SN           ! Select secondary nodes
cmsel,S,Pc7e90b4d_PCB_ES                ! Select main elements
/nerr,-0
ceintf,0.25,,,,,,,0.02
/nerr,default
/COM,+++ Bond Pc7e90b4d_COMP_C37
!-----------------------------------------------
! Bond Pc7e90b4d_COMP_C37
!-----------------------------------------------
cmsel,S,Pc7e90b4d_COMP_C37_SN           ! Select secondary nodes
cmsel,S,Pc7e90b4d_PCB_ES                ! Select main elements
/nerr,-0
ceintf,0.25,,,,,,,0.02
/nerr,default
/COM,+++ Bond Pc7e90b4d_COMP_C36
!-----------------------------------------------
! Bond Pc7e90b4d_COMP_C36
!-----------------------------------------------
cmsel,S,Pc7e90b4d_COMP_C36_SN           ! Select secondary nodes
cmsel,S,Pc7e90b4d_PCB_ES                ! Select main elements
/nerr,-0
ceintf,0.25,,,,,,,0.02
/nerr,default
/COM,+++ Bond Pc7e90b4d_COMP_C39
!-----------------------------------------------
! Bond Pc7e90b4d_COMP_C39
!-----------------------------------------------
cmsel,S,Pc7e90b4d_COMP_C39_SN           ! Select secondary nodes
cmsel,S,Pc7e90b4d_PCB_ES                ! Select main elements
/nerr,-0
ceintf,0.25,,,,,,,0.02
/nerr,default
/COM,+++ Bond Pc7e90b4d_COMP_C38
!-----------------------------------------------
! Bond Pc7e90b4d_COMP_C38
!-----------------------------------------------
cmsel,S,Pc7e90b4d_COMP_C38_SN           ! Select secondary nodes
cmsel,S,Pc7e90b4d_PCB_ES                ! Select main elements
/nerr,-0
ceintf,0.25,,,,,,,0.02
/nerr,default
/COM,+++ Bond Pc7e90b4d_COMP_R10
!-----------------------------------------------
! Bond Pc7e90b4d_COMP_R10
!-----------------------------------------------
cmsel,S,Pc7e90b4d_COMP_R10_SN           ! Select secondary nodes
cmsel,S,Pc7e90b4d_PCB_ES                ! Select main elements
/nerr,-0
ceintf,0.25,,,,,,,0.02
/nerr,default
/COM,+++ Bond Pc7e90b4d_COMP_R12
!-----------------------------------------------
! Bond Pc7e90b4d_COMP_R12
!-----------------------------------------------
cmsel,S,Pc7e90b4d_COMP_R12_SN           ! Select secondary nodes
cmsel,S,Pc7e90b4d_PCB_ES                ! Select main elements
/nerr,-0
ceintf,0.25,,,,,,,0.02
/nerr,default
/COM,+++ Bond Pc7e90b4d_COMP_R11
!-----------------------------------------------
! Bond Pc7e90b4d_COMP_R11
!-----------------------------------------------
cmsel,S,Pc7e90b4d_COMP_R11_SN           ! Select secondary nodes
cmsel,S,Pc7e90b4d_PCB_ES                ! Select main elements
/nerr,-0
ceintf,0.25,,,,,,,0.02
/nerr,default
/COM,+++ Bond Pc7e90b4d_COMP_R14
!-----------------------------------------------
! Bond Pc7e90b4d_COMP_R14
!-----------------------------------------------
cmsel,S,Pc7e90b4d_COMP_R14_SN           ! Select secondary nodes
cmsel,S,Pc7e90b4d_PCB_ES                ! Select main elements
/nerr,-0
ceintf,0.25,,,,,,,0.02
/nerr,default
/COM,+++ Bond Pc7e90b4d_COMP_R13
!-----------------------------------------------
! Bond Pc7e90b4d_COMP_R13
!-----------------------------------------------
cmsel,S,Pc7e90b4d_COMP_R13_SN           ! Select secondary nodes
cmsel,S,Pc7e90b4d_PCB_ES                ! Select main elements
/nerr,-0
ceintf,0.25,,,,,,,0.02
/nerr,default
/COM,+++ Bond Pc7e90b4d_COMP_R16
!-----------------------------------------------
! Bond Pc7e90b4d_COMP_R16
!-----------------------------------------------
cmsel,S,Pc7e90b4d_COMP_R16_SN           ! Select secondary nodes
cmsel,S,Pc7e90b4d_PCB_ES                ! Select main elements
/nerr,-0
ceintf,0.25,,,,,,,0.02
/nerr,default
/COM,+++ Bond Pc7e90b4d_COMP_R15
!-----------------------------------------------
! Bond Pc7e90b4d_COMP_R15
!-----------------------------------------------
cmsel,S,Pc7e90b4d_COMP_R15_SN           ! Select secondary nodes
cmsel,S,Pc7e90b4d_PCB_ES                ! Select main elements
/nerr,-0
ceintf,0.25,,,,,,,0.02
/nerr,default
/COM,+++ Bond Pc7e90b4d_COMP_R18
!-----------------------------------------------
! Bond Pc7e90b4d_COMP_R18
!-----------------------------------------------
cmsel,S,Pc7e90b4d_COMP_R18_SN           ! Select secondary nodes
cmsel,S,Pc7e90b4d_PCB_ES                ! Select main elements
/nerr,-0
ceintf,0.25,,,,,,,0.02
/nerr,default
/COM,+++ Bond Pc7e90b4d_COMP_R17
!-----------------------------------------------
! Bond Pc7e90b4d_COMP_R17
!-----------------------------------------------
cmsel,S,Pc7e90b4d_COMP_R17_SN           ! Select secondary nodes
cmsel,S,Pc7e90b4d_PCB_ES                ! Select main elements
/nerr,-0
ceintf,0.25,,,,,,,0.02
/nerr,default
/COM,+++ Bond Pc7e90b4d_COMP_R19
!-----------------------------------------------
! Bond Pc7e90b4d_COMP_R19
!-----------------------------------------------
cmsel,S,Pc7e90b4d_COMP_R19_SN           ! Select secondary nodes
cmsel,S,Pc7e90b4d_PCB_ES                ! Select main elements
/nerr,-0
ceintf,0.25,,,,,,,0.02
/nerr,default
/COM,+++ Bond Pc7e90b4d_COMP_C40
!-----------------------------------------------
! Bond Pc7e90b4d_COMP_C40
!-----------------------------------------------
cmsel,S,Pc7e90b4d_COMP_C40_SN           ! Select secondary nodes
cmsel,S,Pc7e90b4d_PCB_ES                ! Select main elements
/nerr,-0
ceintf,0.25,,,,,,,0.02
/nerr,default
/COM,--------------------------------------------------
/COM,Sherlock Constraints
/COM,--------------------------------------------------
!-----------------------------------------------
! Enter PreProcessor
!-----------------------------------------------
/prep7
immed,0                                 ! Disable immediate mode graphics
!-----------------------------------------------
! Shape Warnings
!-----------------------------------------------
/nerr,-0
shpp,off,ANGD
shpp,off,ASPECT
shpp,off,PARAL
shpp,off,MAXANG
shpp,off,JACRAT
shpp,off,WARP
/nerr,default
!-----------------------------------------------
! Exit PreProcessor
!-----------------------------------------------
finish
/COM,--------------------------------------------------
/COM,End of Sherlock Geometry Model
/COM,--------------------------------------------------
!-----------------------------------------------
! Exit PreProcessor
!-----------------------------------------------
finish
!-----------------------------------------------
! Enter Solution
!-----------------------------------------------
/SOLU
!-----------------------------------------------
! Analysis Step
!-----------------------------------------------
antype,MODAL                            ! Modal Analysis
modopt,LANB,50,2.0E01,2.0E03            ! Frequency Range
allsel                                  ! Select all model entities
!-----------------------------------------------
! Exit Solution
!-----------------------------------------------
finish
!-----------------------------------------------
! Default View
!-----------------------------------------------
/VIEW,1,0,0,1
/ANG,1,0,ZS,0
!-----------------------------------------------
! Plot all elements
!-----------------------------------------------
/PBC,ALL,,0                             ! Reset plot properties
/PNUM,MAT,1                             ! Color by material number
/NUMBER,1                               ! Don't show numbers
allsel,all
eplot
save
finish
/go
!-----------------------------------------------
! End of model definition
!-----------------------------------------------
