/BATCH
/PREP7
/UNITS,MPA
ET,1,SHELL181
KEYOPT,1,3,2
KEYOPT,1,8,2
SECTYPE,1,SHELL
SECDATA,.15,1,0,7
SECOFFSET,MID
MP,EX,1,205000
MP,PRXY,1,.29
TB,BISO,1
TBDATA,1,148.0,1000
ET,2,MPC184
KEYOPT,2,1,1
KEYOPT,2,2,0
N,1,8.890748341,19.80938359,-1.197679
N,2,9.021632484,19.93306676,-1.197679
N,3,9.179517752,20.06233617,-1.197679
N,4,9.368866391,20.19347536,-1.197679
N,5,9.593341146,20.32063443,-1.197679
N,6,9.854518963,20.43567014,-1.197679
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N,2481,10.803671,60.407,-11.822674
TYPE,1
MAT,1
SECNUM,1
EN,1,2,66,65,1
EN,2,3,67,66,2
EN,3,4,68,67,3
EN,4,5,69,68,4
EN,5,6,70,69,5
EN,6,7,71,70,6
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EN,2304,2462,2479,2480,2463
ESEL,S,TYPE,,1
CM,NICKEL,ELEM
ALLSEL,ALL
TYPE,2
E,2481,776
E,2481,777
E,2481,778
E,2481,837
E,2481,838
E,2481,839
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E,2481,2480
ALLSEL,ALL
ET,5,COMBIN14
KEYOPT,5,2,3
R,5,100000.0
REAL,5
TYPE,5
*GET,XX,NODE,2930,LOC,X
*GET,YY,NODE,2930,LOC,Y
*GET,ZZ,NODE,2930,LOC,Z
N,4278,XX,YY,ZZ
E,2930,4278
*GET,XX,NODE,3828,LOC,X
*GET,YY,NODE,3828,LOC,Y
*GET,ZZ,NODE,3828,LOC,Z
N,4279,XX,YY,ZZ
E,3828,4279
/SOLU
NLGEOM,ON
FINISH
/PREP7
ET,3,CONTA174
KEYOPT,3,2,0
KEYOPT,3,10,2
KEYOPT,3,11,1
KEYOPT,3,12,0
ET,4,TARGE170
KEYOPT,4,2,1
MP,MU,2,0.2
R,1,,,.1,.01,,.2
REAL,1
MAT,2
TYPE,3
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TYPE,4
TSHAP,PILO
E,2930
TSHAP,QUAD
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EN,4241,2802,2866,2929,2865
D,2930,ALL,0
DDELE,2930,UZ
R,2,,,.1,.01,,.2
REAL,2
MAT,2
TYPE,3
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TYPE,4
TSHAP,PILO
E,3379
TSHAP,QUAD
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EN,5394,3314,3378,3315,3251
D,3379,ALL,0
R,3,,,.1,.01,,.2
REAL,3
MAT,2
TYPE,3
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TYPE,4
TSHAP,PILO
E,3828
TSHAP,QUAD
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EN,6547,3763,3827,3764,3700
D,3828,ALL,0
DDELE,3828,UZ
R,4,,,.1,.01,,.2
REAL,4
MAT,2
TYPE,3
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TYPE,4
TSHAP,PILO
E,4277
TSHAP,QUAD
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EN,7700,4149,4213,4276,4212
D,4277,ALL,0
D,2481,ALL,0
ESEL,S,TYPE,,3
CM,CLAMP_CONTACT,ELEM
ALLSEL,ALL
/SOLU
NLGEOM,ON
FINISH
/PREP7
CHECK
*GET,NN,NODE,0,COUNT
*GET,NE,ELEM,0,COUNT
*CFOPEN,inventory,txt
*VWRITE,NN,NE
(2F12.0)
*CFCLOS
SAVE,model,db
FINISH
