/BATCH
/TITLE,Edge battery: continuous preloaded nickel damage
/PREP7
/UNITS,MPA
ET,1,SHELL181
KEYOPT,1,3,2
KEYOPT,1,8,2
SECTYPE,1,SHELL
SECDATA,.15,1,0,7
SECOFFSET,MID
MP,EX,1,205000
MP,PRXY,1,.29
MP,EX,1,205000
MP,PRXY,1,.29
TB,PLAS,1,,,MISO
TBPT,DEFI,0.0,185.0
TBPT,DEFI,0.001,192.036
TBPT,DEFI,0.003,205.348
TBPT,DEFI,0.005,217.695
TBPT,DEFI,0.007,229.138
TBPT,DEFI,0.009,239.737
TBPT,DEFI,0.011,249.548
TBPT,DEFI,0.013,258.626
TBPT,DEFI,0.015,267.023
TBPT,DEFI,0.017,274.791
TBPT,DEFI,0.019,281.979
TBPT,DEFI,0.021,288.634
TBPT,DEFI,0.023,294.802
TBPT,DEFI,0.025,300.525
TBPT,DEFI,0.027,305.846
TBPT,DEFI,0.029,309.974
TBPT,DEFI,0.031,313.576
TBPT,DEFI,0.033,317.153
TBPT,DEFI,0.035,320.706
TBPT,DEFI,0.037,324.234
TBPT,DEFI,0.039,327.739
TBPT,DEFI,0.041,331.219
TBPT,DEFI,0.043,334.675
TBPT,DEFI,0.045,338.107
TBPT,DEFI,0.047,341.515
TBPT,DEFI,0.049,344.898
TBPT,DEFI,0.051,348.257
TBPT,DEFI,0.053,351.592
TBPT,DEFI,0.055,354.903
TBPT,DEFI,0.057,358.19
TBPT,DEFI,0.059,361.452
TBPT,DEFI,0.061,364.69
TBPT,DEFI,0.063,367.904
TBPT,DEFI,0.065,371.094
TBPT,DEFI,0.067,374.259
TBPT,DEFI,0.069,377.401
TBPT,DEFI,0.071,380.518
TBPT,DEFI,0.073,383.611
TBPT,DEFI,0.075,386.679
TBPT,DEFI,0.077,389.724
TBPT,DEFI,0.079,392.744
TBPT,DEFI,0.081,395.74
TBPT,DEFI,0.083,398.712
TBPT,DEFI,0.085,401.659
TBPT,DEFI,0.087,404.583
TBPT,DEFI,0.089,407.482
TBPT,DEFI,0.091,410.357
TBPT,DEFI,0.093,413.208
TBPT,DEFI,0.095,416.034
TBPT,DEFI,0.097,418.837
TBPT,DEFI,0.099,421.615
TBPT,DEFI,0.101,424.369
TBPT,DEFI,0.103,427.099
TBPT,DEFI,0.105,429.804
TBPT,DEFI,0.107,432.486
TBPT,DEFI,0.109,435.143
TBPT,DEFI,0.111,437.776
TBPT,DEFI,0.113,440.384
TBPT,DEFI,0.115,442.969
TBPT,DEFI,0.117,445.529
TBPT,DEFI,0.119,448.065
TBPT,DEFI,0.121,450.577
TBPT,DEFI,0.123,453.065
TBPT,DEFI,0.125,455.528
TBPT,DEFI,0.127,457.967
TBPT,DEFI,0.129,460.382
TBPT,DEFI,0.131,462.773
TBPT,DEFI,0.133,465.14
TBPT,DEFI,0.135,467.482
TBPT,DEFI,0.137,469.8
TBPT,DEFI,0.139,472.094
TBPT,DEFI,0.141,474.364
TBPT,DEFI,0.143,476.609
TBPT,DEFI,0.145,478.831
TBPT,DEFI,0.147,481.028
TBPT,DEFI,0.149,483.201
TBPT,DEFI,0.151,485.349
TBPT,DEFI,0.153,487.474
TBPT,DEFI,0.155,489.574
TBPT,DEFI,0.157,491.65
TBPT,DEFI,0.159,493.702
TBPT,DEFI,0.161,495.73
TBPT,DEFI,0.163,497.733
TBPT,DEFI,0.165,499.712
TBPT,DEFI,0.167,501.667
TBPT,DEFI,0.169,503.598
TBPT,DEFI,0.171,505.505
TBPT,DEFI,0.173,507.387
TBPT,DEFI,0.175,509.245
TBPT,DEFI,0.177,511.079
TBPT,DEFI,0.179,512.889
TBPT,DEFI,0.181,514.675
TBPT,DEFI,0.183,516.436
TBPT,DEFI,0.185,518.173
TBPT,DEFI,0.187,519.886
TBPT,DEFI,0.189,521.575
TBPT,DEFI,0.191,523.239
TBPT,DEFI,0.193,524.879
TBPT,DEFI,0.195,526.496
TBPT,DEFI,0.197,528.087
TBPT,DEFI,0.199,529.655
TBPT,DEFI,0.199999,530.429
TBPT,DEFI,0.21,538.676286
TBPT,DEFI,0.22,546.658403
TBPT,DEFI,0.23,554.396123
TBPT,DEFI,0.24,561.907087
TBPT,DEFI,0.25,569.206989
TBPT,DEFI,0.26,576.309857
TBPT,DEFI,0.27,583.228293
TBPT,DEFI,0.28,589.97366
TBPT,DEFI,0.29,596.556243
TBPT,DEFI,0.3,602.985386
TBPT,DEFI,0.31,609.269609
TBPT,DEFI,0.32,615.416698
TBPT,DEFI,0.33,621.433796
TBPT,DEFI,0.34,627.327469
TBPT,DEFI,0.35,633.10377
TBPT,DEFI,0.36,638.768292
TBPT,DEFI,0.37,644.326216
TBPT,DEFI,0.38,649.78235
TBPT,DEFI,0.39,655.141164
TBPT,DEFI,0.4,660.406824
TBPT,DEFI,0.41,665.58322
TBPT,DEFI,0.42,670.673988
TBPT,DEFI,0.43,675.682533
TBPT,DEFI,0.44,680.61205
TBPT,DEFI,0.45,685.46554
TBPT,DEFI,0.46,690.245828
TBPT,DEFI,0.47,694.955573
TBPT,DEFI,0.48,699.597285
TBPT,DEFI,0.49,704.173334
TBPT,DEFI,0.5,708.685961
TBPT,DEFI,0.51,713.137287
TBPT,DEFI,0.52,717.529323
TBPT,DEFI,0.53,721.863976
TBPT,DEFI,0.54,726.143058
TBPT,DEFI,0.55,730.368292
TBPT,DEFI,0.56,734.541315
TBPT,DEFI,0.57,738.663689
TBPT,DEFI,0.58,742.7369
TBPT,DEFI,0.59,746.762367
TBPT,DEFI,0.6,750.741446
TBPT,DEFI,0.61,754.675431
TBPT,DEFI,0.62,758.56556
TBPT,DEFI,0.63,762.413017
TBPT,DEFI,0.64,766.218937
TBPT,DEFI,0.65,769.984407
TBPT,DEFI,0.66,773.71047
TBPT,DEFI,0.67,777.398125
TBPT,DEFI,0.68,781.048333
TBPT,DEFI,0.69,784.662017
TBPT,DEFI,0.7,788.240064
TBPT,DEFI,0.71,791.783327
TBPT,DEFI,0.72,795.292626
TBPT,DEFI,0.73,798.768753
TBPT,DEFI,0.74,802.212469
TBPT,DEFI,0.75,805.624508
TBPT,DEFI,0.76,809.005578
TBPT,DEFI,0.77,812.356363
TBPT,DEFI,0.78,815.677521
TBPT,DEFI,0.79,818.969689
TBPT,DEFI,0.8,822.233483
TBPT,DEFI,0.81,825.469498
TBPT,DEFI,0.82,828.678308
TBPT,DEFI,0.83,831.860469
TBPT,DEFI,0.84,835.016521
TBPT,DEFI,0.85,838.146985
TBPT,DEFI,0.86,841.252364
TBPT,DEFI,0.87,844.333149
TBPT,DEFI,0.88,847.389814
TBPT,DEFI,0.89,850.422819
TBPT,DEFI,0.9,853.432608
TBPT,DEFI,0.91,856.419616
TBPT,DEFI,0.92,859.384262
TBPT,DEFI,0.93,862.326954
TBPT,DEFI,0.94,865.248088
TBPT,DEFI,0.95,868.148048
TBPT,DEFI,0.96,871.027209
TBPT,DEFI,0.97,873.885934
TBPT,DEFI,0.98,876.724576
TBPT,DEFI,0.99,879.543481
TBPT,DEFI,1,882.342981
TBPT,DEFI,1.01,885.123403
TBPT,DEFI,1.02,887.885063
TBPT,DEFI,1.03,890.628271
TBPT,DEFI,1.04,893.353328
TBPT,DEFI,1.05,896.060525
TBPT,DEFI,1.06,898.750148
TBPT,DEFI,1.07,901.422476
TBPT,DEFI,1.08,904.077781
TBPT,DEFI,1.09,906.716326
TBPT,DEFI,1.1,909.338369
TBPT,DEFI,1.11,911.944163
TBPT,DEFI,1.12,914.533954
TBPT,DEFI,1.13,917.10798
TBPT,DEFI,1.14,919.666477
TBPT,DEFI,1.15,922.209673
TBPT,DEFI,1.16,924.737791
TBPT,DEFI,1.17,927.25105
TBPT,DEFI,1.18,929.749663
TBPT,DEFI,1.19,932.233838
TBPT,DEFI,1.2,934.703779
TBPT,DEFI,1.21,937.159685
TBPT,DEFI,1.22,939.601751
TBPT,DEFI,1.23,942.030167
TBPT,DEFI,1.24,944.44512
TBPT,DEFI,1.25,946.846792
TBPT,DEFI,1.26,949.235361
TBPT,DEFI,1.27,951.611003
TBPT,DEFI,1.28,953.973887
TBPT,DEFI,1.29,956.324182
TBPT,DEFI,1.3,958.662052
TBPT,DEFI,1.31,960.987656
TBPT,DEFI,1.32,963.301152
TBPT,DEFI,1.33,965.602694
TBPT,DEFI,1.34,967.892433
TBPT,DEFI,1.35,970.170517
TBPT,DEFI,1.36,972.437092
TBPT,DEFI,1.37,974.692298
TBPT,DEFI,1.38,976.936276
TBPT,DEFI,1.39,979.169162
TBPT,DEFI,1.4,981.39109
TBPT,DEFI,1.41,983.602192
TBPT,DEFI,1.42,985.802597
TBPT,DEFI,1.43,987.992431
TBPT,DEFI,1.44,990.171818
TBPT,DEFI,1.45,992.340881
TBPT,DEFI,1.46,994.499738
TBPT,DEFI,1.47,996.648508
TBPT,DEFI,1.48,998.787305
TBPT,DEFI,1.49,1000.91624
TBPT,DEFI,1.5,1003.03543
TBPT,DEFI,1.51,1005.14498
TBPT,DEFI,1.52,1007.245
TBPT,DEFI,1.53,1009.3356
TBPT,DEFI,1.54,1011.41687
TBPT,DEFI,1.55,1013.48892
TBPT,DEFI,1.56,1015.55184
TBPT,DEFI,1.57,1017.60575
TBPT,DEFI,1.58,1019.65073
TBPT,DEFI,1.59,1021.68688
TBPT,DEFI,1.6,1023.71429
TB,CDM,1,,2,DUCTILE
! Numerical tension-only extension: negligible accumulation for negative eta.
! Transition [-1e-6,0]; not a calibrated compression/shear fracture law.
TBPT,DEFI,-1000,1e6
TBPT,DEFI,-.000001,1e6
TBPT,DEFI,0,0.3
TBPT,DEFI,0.3333333333,0.3
TBPT,DEFI,0.4,0.2714512254
TBPT,DEFI,0.5,0.2336402349
TBPT,DEFI,0.6,0.2010960138
TBPT,DEFI,0.6666666667,0.1819591979
TBPT,DEFI,0.8,0.1489755911
TBPT,DEFI,1,0.1103638324
TBPT,DEFI,1.2,0.08175953791
TBPT,DEFI,1.5,0.05213218304
TBPT,DEFI,2,0.02462549959
TB,CDM,1,,,LINDMG
TBDATA,1,0.12
TB,CDM,1,,,DCAP
TBDATA,1,0.9999

ET,2,MPC184
KEYOPT,2,1,1
KEYOPT,2,2,1
N,1,8.890748341,19.80938359,-1.197679
N,2,8.953100016,19.87036586,-1.197679
N,3,9.021632484,19.93306676,-1.197679
N,4,9.096914179,19.99719028,-1.197679
N,5,9.179517752,20.06233617,-1.197679
N,6,9.269998671,20.12798339,-1.197679
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N,9569,10.803671,60.407,-11.822674
TYPE,1
MAT,1
SECNUM,1
EN,1,2,130,129,1
EN,2,3,131,130,2
EN,3,4,132,131,3
EN,4,5,133,132,4
EN,5,6,134,133,5
EN,6,7,135,134,6
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EN,9216,9534,9567,9568,9535
ESEL,S,TYPE,,1
CM,NICKEL,ELEM
ALLSEL,ALL
TYPE,2
E,9569,3087
E,9569,3088
E,9569,3089
E,9569,3090
E,9569,3091
E,9569,3211
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E,9569,9568
ALLSEL,ALL
/SOLU
NLGEOM,ON
FINISH
/PREP7
ET,3,CONTA174
KEYOPT,3,2,0
KEYOPT,3,10,2
KEYOPT,3,11,1
KEYOPT,3,12,0
ET,4,TARGE170
KEYOPT,4,2,1
MP,MU,2,0.2
R,1,,,0.1,.01,,.2
REAL,1
MAT,2
TYPE,3
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TYPE,4
TSHAP,PILO
E,11234
TSHAP,QUAD
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EN,16849,10978,11106,11233,11105
D,11234,ALL,0
DDELE,11234,UZ
R,2,,,0.1,.01,,.2
REAL,2
MAT,2
TYPE,3
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TYPE,4
TSHAP,PILO
E,12899
TSHAP,QUAD
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EN,21458,12770,12898,12771,12643
D,12899,ALL,0
R,3,,,0.1,.01,,.2
REAL,3
MAT,2
TYPE,3
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TYPE,4
TSHAP,PILO
E,14564
TSHAP,QUAD
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EN,26067,14435,14563,14436,14308
D,14564,ALL,0
DDELE,14564,UZ
R,4,,,0.1,.01,,.2
REAL,4
MAT,2
TYPE,3
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TYPE,4
TSHAP,PILO
E,16229
TSHAP,QUAD
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EN,30676,15973,16101,16228,16100
D,16229,ALL,0
D,9569,ALL,0
ESEL,S,TYPE,,3
CM,CLAMP_CONTACT,ELEM
ALLSEL,ALL
/SOLU
NLGEOM,ON
FINISH
/PREP7
CHECK
*GET,NN,NODE,0,COUNT
*GET,NE,ELEM,0,COUNT
*CFOPEN,inventory,txt
*VWRITE,NN,NE
(2F12.0)
*CFCLOS
SAVE,model,db
FINISH
