MatId=ARG1
/PREP7
MP,DENS,MatId,7.85e-09,	! tonne mm^-3
MP,ALPX,MatId,1.2e-05,	! C^-1
MP,C,MatId,434000000,	! mm^2 s^-2 C^-1
MP,KXX,MatId,60.5,	! tonne mm s^-3 C^-1
MP,RSVX,MatId,0.00017,	! ohm mm
MP,EX,MatId,200000,	! tonne s^-2 mm^-1
MP,NUXY,MatId,0.3,
MP,MURX,MatId,10000,
