/batch
!-----------------------------------------------
! ansys-FEAModel.apdl - Generated by Sherlock
!-----------------------------------------------
/UIS,MSGPOP,3                           ! Display message box only for errors
/UIS,REPLOT,0                           ! Disable auto replot
!-----------------------------------------------
! Sherlock/Ansys Model: PCB_sim_1 PCB1
!-----------------------------------------------
finish
/clear
/title,PCB1
/nopr
!-----------------------------------------------
! Load model from CDB file
!-----------------------------------------------
cdread,db,'Z:\Developer\MIT_Rkt_Team\2026-7\MIT-RT-26_27-Work\simulation_work\avionics\powerboardsim\1\powerboardsim_v1_files\dp0\global\SHER\SHER\PCB_sim_1\PCB1\modules\NaturalFreq\ansys-FEAModel','cdb'
!-----------------------------------------------
! Enter PreProcessor
!-----------------------------------------------
/prep7
immed,0                                 ! Disable immediate mode graphics
!-----------------------------------------------
! Shape Warnings
!-----------------------------------------------
/nerr,-0
shpp,off,ANGD
shpp,off,ASPECT
shpp,off,PARAL
shpp,off,MAXANG
shpp,off,JACRAT
shpp,off,WARP
/nerr,default
/COM,--------------------------------------------------
/COM,Sherlock Geometry Model
/COM,--------------------------------------------------
! -------------------------------------------------------
! Mesh Type = Bonded
! Modeling Regions = DISABLED
! PCB Model = Uniform
! Element Order = First Order
! Max Mesh Size = 2.0 mm
! Vertical Mesh Size = 0 mm
! Quads Preferred = YES
! Max Mesh Size = 2.0 mm
!
! Mount Point Modeling = ENABLED
! Element Order = First Order
! Max Mesh Size = 2 mm
! Vertical Mesh Size = 0 mm
!
! Drill Hole Modeling = ENABLED
! Min Hole Diameter = 1 mm
! Max Edge Length = 1 mm
!
! Part Modeling = ENABLED
! Min Part Size = 0 mm
! Element Order = First Order
! Max Mesh Size = 1.0 mm
! Vertical Mesh Size = 0 mm
! Filtered Part Results = DISABLED
!
! Lead Modeling = DISABLED
! Element Order = First Order
! Max Mesh Size = 2 mm
! Vertical Mesh Size = 0 mm
!
! Wire Bond Modeling = DISABLED
! Element Order = First Order
! Max Segment Length = 2 mm
!
! Heat Sink Modeling = DISABLED
! Element Order = First Order
! Max Mesh Size = 2 mm
! Vertical Mesh Size = 0 mm
!
! Potting Regions = DISABLED
! Element Order = First Order
! Max Mesh Size = 2 mm
! Vertical Mesh Size = 0 mm
!
! Mechanical Parts = DISABLED
! Element Order = First Order
! Max Mesh Size = 2 mm
! Vertical Mesh Size = 0 mm
! -------------------------------------------------------
!-----------------------------------------------
! Disable Numbering
!-----------------------------------------------
/pnum,NODE,0
/pnum,ELEM,0
/pnum,SEC,0
/pnum,MAT,0
/pnum,TYPE,0
/pnum,REAL,0
/pnum,ESYS,0
/pnum,LOC,0
/pnum,KP,0
/pnum,LINE,0
/pnum,AREA,0
/pnum,VOLU,0
/pnum,SVAL,0
/pnum,TABNAM,0
/number,-1
/COM,--------------------------------------------------
/COM,End of Sherlock Geometry Model
/COM,--------------------------------------------------
!-----------------------------------------------
! Exit PreProcessor
!-----------------------------------------------
finish
allsel,all
save
finish
/go
!-----------------------------------------------
! End of model definition
!-----------------------------------------------
