FINISH
/POST1
SET,LAST
ALLSEL,ALL
*GET,S4_TIME,ACTIVE,0,SET,TIME
*CFOPEN,observed_time,txt
*VWRITE,S4_TIME
(E24.16)
*CFCLOSE
*DEL,S4_N
*DIM,S4_N,ARRAY,54540
*DEL,S4_T
*DIM,S4_T,ARRAY,54540
*DEL,S4_M
*DIM,S4_M,ARRAY,54540
*DEL,S4_E
*DIM,S4_E,ARRAY,35200
*VFILL,S4_N(1),RAMP,1,1
*VGET,S4_T(1),NODE,1,TEMP
*VGET,S4_M(1),NODE,1,NSEL
*CFOPEN,node_temperatures,txt
*VMASK,S4_M(1)
*VWRITE,S4_N(1),S4_T(1)
(F10.0,1X,E24.16)
*CFCLOSE
*VFILL,S4_E(1),RAMP,1,1
ESEL,S,TYPE,,1,4
ESEL,R,LIVE
ETABLE,ERAS
*DEL,S4_ALP
*DIM,S4_ALP,ARRAY,35200
ESEL,S,TYPE,,1
ESEL,R,LIVE
ETABLE,ALP,SVAR,1
*VGET,S4_ALP(1),ELEM,1,ETAB,ALP
*DEL,S4_GAS
*DIM,S4_GAS,ARRAY,35200
ESEL,S,TYPE,,1
ESEL,R,LIVE
ETABLE,GAS,SVAR,3
*VGET,S4_GAS(1),ELEM,1,ETAB,GAS
*DEL,S4_GSEN
*DIM,S4_GSEN,ARRAY,35200
ESEL,S,TYPE,,1
ESEL,R,LIVE
ETABLE,GSEN,SVAR,5
*VGET,S4_GSEN(1),ELEM,1,ETAB,GSEN
*DEL,S4_QZ
*DIM,S4_QZ,ARRAY,35200
ESEL,S,TYPE,,1,4
ESEL,R,LIVE
ETABLE,QZ,TF,Z
*VGET,S4_QZ(1),ELEM,1,ETAB,QZ
*DEL,S4_CAP
*DIM,S4_CAP,ARRAY,35200
ESEL,S,TYPE,,1,4
ESEL,R,LIVE
ETABLE,CAP,NMISC,38
*VGET,S4_CAP(1),ELEM,1,ETAB,CAP
*DEL,S4_GEN
*DIM,S4_GEN,ARRAY,35200
ESEL,S,TYPE,,1,4
ESEL,R,LIVE
ETABLE,GEN,NMISC,39
*VGET,S4_GEN(1),ELEM,1,ETAB,GEN
*DEL,S4_CONV
*DIM,S4_CONV,ARRAY,35200
ESEL,S,TYPE,,1,4
ESEL,R,LIVE
ETABLE,CONV,NMISC,40
*VGET,S4_CONV(1),ELEM,1,ETAB,CONV
*DEL,S4_HFX
*DIM,S4_HFX,ARRAY,35200
ESEL,S,TYPE,,1,4
ESEL,R,LIVE
ETABLE,HFX,NMISC,41
*VGET,S4_HFX(1),ELEM,1,ETAB,HFX
*DEL,S4_RAD
*DIM,S4_RAD,ARRAY,35200
ESEL,S,TYPE,,1,4
ESEL,R,LIVE
ETABLE,RAD,NMISC,42
*VGET,S4_RAD(1),ELEM,1,ETAB,RAD
*DEL,S4_EM
*DIM,S4_EM,ARRAY,35200
ESEL,S,TYPE,,1,4
ESEL,R,LIVE
*VGET,S4_EM(1),ELEM,1,ESEL
*CFOPEN,element_fields,txt
*VMASK,S4_EM(1)
*VWRITE,S4_E(1),S4_ALP(1),S4_GAS(1),S4_GSEN(1),S4_QZ(1)
(F10.0,4(1X,E24.16))
*CFCLOSE
*CFOPEN,energy_fields,txt
*VMASK,S4_EM(1)
*VWRITE,S4_E(1),S4_CAP(1),S4_GEN(1),S4_CONV(1),S4_HFX(1),S4_RAD(1)
(F10.0,5(1X,E22.14))
*CFCLOSE
ALLSEL,ALL
FINISH
