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/batch
! ANSYS input file written by Workbench version 2026 R1
/TITLE,Simulation 4 - coupled sector - exploratory
/com,--- Data in consistent MKS units. See Solving Units in the help system for more information.
/units,MKS
/prep7
! Turn off shape checking because checks already performed inside WB mesher.
! See help system for more information.
SHPP,OFF,,NOWARN
etcon,set             ! allow ANSYS to choose best KEYOP's for 180x elements, resets any applicable keyopt to MAPDL defaults
/com,*********** Send User Defined Coordinate System(s) ***********
csys,0
/com,*********** Nodes for the whole assembly ***********
nblock,3,,59994
(1i9,3e20.9e3)
        1     1.638180682E-17     9.149000000E-01     6.792515625E-02
        2     1.612188828E-17     9.149000000E-01     6.790531250E-02
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-1
/com,*********** Elements for Body 1 'phe0_inner' ***********
et,1,278
MAT,1 $ TYPE,1 $ REAL,1 $ SECNUM,1 $ ESYS,0    ! ELEMNODES = 8
eblock,21,COMPACT,,12800
(21i9)
        1        1    19040    19241    19506    12474    19139    19140    19507
        2        1    19506    19241    19040    12475    18775    18939    18940
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-1
secnum,1    ! reset the section ID to default
/com,*********** Elements for Body 2 'epoxy' ***********
et,2,278
MAT,2 $ TYPE,2 $ REAL,2 $ SECNUM,2 $ ESYS,0    ! ELEMNODES = 8
eblock,21,COMPACT,,3200
(21i9)
    12801    19696    24383    24584    24801    22665    24482    24483    24802
    12802    19696    24801    24584    24383    22666    24166    24282    24283
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-1
secnum,1    ! reset the section ID to default
/com,*********** Elements for Body 3 'phe1_outer' ***********
et,3,278
MAT,3 $ TYPE,3 $ REAL,3 $ SECNUM,3 $ ESYS,0    ! ELEMNODES = 8
eblock,21,COMPACT,,12800
(21i9)
    16001    24847    44290    44289    44186    37320    44415    44188    44187
    16002    24847    44186    44289    44290    37321    43685    43684    43683
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-1
secnum,1    ! reset the section ID to default
/com,*********** Elements for Body 4 'aluminium' ***********
et,4,278
MAT,4 $ TYPE,4 $ REAL,4 $ SECNUM,4 $ ESYS,0    ! ELEMNODES = 8
eblock,21,COMPACT,,6400
(21i9)
    28801    44542    54417    54416    54313    50679    54478    54315    54314
    28802    44542    54313    54416    54417    50680    53812    53811    53810
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-1
secnum,1    ! reset the section ID to default
toffst,273.15,      ! Temperature offset from absolute zero
/com,*********** Send Materials ***********
MPTEMP,,,,,,,,
MPTEMP,1,26.85
MPTEMP,2,326.85
MPTEMP,3,626.85
MPDATA,DENS,1, ,1250,1200,1150,	! kg m^-3
MPTEMP,,,,,,,,
MPTEMP,,,,,,,,
MPTEMP,1,26.85
MPTEMP,2,326.85
MPTEMP,3,626.85
MPDATA,C,1, ,900,1100,1300,	! J kg^-1 C^-1
MPTEMP,,,,,,,,
MPTEMP,,,,,,,,
MPTEMP,1,26.85
MPTEMP,2,326.85
MPTEMP,3,626.85
MPDATA,KXX,1, ,0.25,0.32,0.36,	! W m^-1 C^-1
MPTEMP,,,,,,,,

Temperature = 'TEMP' ! Temperature
MP,DENS,2,1150,	! kg m^-3
MPTEMP,,,,,,,,
MPTEMP,1,26.85
MPTEMP,2,326.85
MPDATA,KXX,2, ,0.25,0.3,	! W m^-1 C^-1
MPTEMP,,,,,,,,
MPTEMP,,,,,,,,
MPTEMP,1,26.85
MPTEMP,2,326.85
MPDATA,C,2, ,1000,1100,	! J kg^-1 C^-1
MPTEMP,,,,,,,,

Temperature = 'TEMP' ! Temperature
MPTEMP,,,,,,,,
MPTEMP,1,26.85
MPTEMP,2,326.85
MPTEMP,3,626.85
MPDATA,DENS,3, ,1250,1200,1150,	! kg m^-3
MPTEMP,,,,,,,,
MPTEMP,,,,,,,,
MPTEMP,1,26.85
MPTEMP,2,326.85
MPTEMP,3,626.85
MPDATA,KXX,3, ,0.25,0.32,0.36,	! W m^-1 C^-1
MPTEMP,,,,,,,,
MPTEMP,,,,,,,,
MPTEMP,1,26.85
MPTEMP,2,326.85
MPTEMP,3,626.85
MPDATA,C,3, ,900,1100,1300,	! J kg^-1 C^-1
MPTEMP,,,,,,,,

MP,DENS,4,2700,	! kg m^-3
MP,KXX,4,167,	! W m^-1 C^-1
MP,C,4,896,	! J kg^-1 C^-1

! ****** Begin Command Snippet ******
*dim,matids,,1
*set,matids(1),1
*set,matid,1
*dim,typeids,,1
*set,typeids(1),1
! Iteration 4: fixed REFERENCE densities; fixed mesh, no thermal expansion.
! Avoids temperature-induced mass changes unaccounted for in gas generation.
TBDELE,USER,1
TBDELE,STATE,1
TB,USER,1,10,15,THERM
TBTEMP,22.0
TBDATA,1,0.25,0.3,900,800,1250.0,600.0
TBDATA,7,333,64081,1,418000.0,273.15,1600
TBDATA,13,300,1,1
TBTEMP,26.85
TBDATA,1,0.25,0.3,900,800,1250.0,600.0
TBDATA,7,333,64081,1,418000.0,273.15,1600
TBDATA,13,300,1,1
TBTEMP,326.85
TBDATA,1,0.32,0.35,1100,900,1250.0,600.0
TBDATA,7,333,64081,1,418000.0,273.15,1600
TBDATA,13,300,1,1
TBTEMP,626.85
TBDATA,1,0.36,0.4,1300,1000,1250.0,600.0
TBDATA,7,333,64081,1,418000.0,273.15,1600
TBDATA,13,300,1,1
TBTEMP,776.85
TBDATA,1,0.36,0.44,1300,1250,1250.0,600.0
TBDATA,7,333,64081,1,418000.0,273.15,1600
TBDATA,13,300,1,1
TBTEMP,926.85
TBDATA,1,0.36,0.49,1300,1550,1250.0,600.0
TBDATA,7,333,64081,1,418000.0,273.15,1600
TBDATA,13,300,1,1
TBTEMP,1226.85
TBDATA,1,0.36,0.68,1300,1950,1250.0,600.0
TBDATA,7,333,64081,1,418000.0,273.15,1600
TBDATA,13,300,1,1
TBTEMP,1426.85
TBDATA,1,0.36,0.81,1300,2060,1250.0,600.0
TBDATA,7,333,64081,1,418000.0,273.15,1600
TBDATA,13,300,1,1
TBTEMP,1926.85
TBDATA,1,0.36,1.24,1300,2085,1250.0,600.0
TBDATA,7,333,64081,1,418000.0,273.15,1600
TBDATA,13,300,1,1
TBTEMP,2476.85
TBDATA,1,0.36,1.73,1300,2090,1250.0,600.0
TBDATA,7,333,64081,1,418000.0,273.15,1600
TBDATA,13,300,1,1
TB,STATE,1,,5
TBDATA,1,0,0,0,0,0
*set, matids, ,
*set, typeids, ,
! ****** End   Command Snippet ******
!************************* Model Summary ********************
! phe0_inner,	PHENOLIC_PYROLYSIS,	matid,	1
! epoxy,	EPOXY,	matid,	2
! phe1_outer,	PHENOLIC_VIRGIN,	matid,	3
! aluminium,	ALUMINUM,	matid,	4
!************************* End Model Summary ********************
/com,*********** Create Contact "Bonded - phe0_outer to epoxy_inner" ***********
*set,tid,6
*set,cid,5
r,tid
r,cid
et,tid,170
et,cid,174
MAT,6 $ TYPE,6 $ REAL,6 $ SECNUM,6 $ ESYS,0    ! ELEMNODES = 4
eblock,21,COMPACT,,200
(21i9)
    72705    19139    19040    19241    19140
    72706    19141    19041    19040    19139
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-1
secnum,1    ! reset the section ID to default
MAT,5 $ TYPE,5 $ REAL,5 $ SECNUM,5 $ ESYS,0    ! ELEMNODES = 4
eblock,21,COMPACT,,200
(21i9)
    72905    19139    19040    19241    19140
    72906    19141    19041    19040    19139
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-1
secnum,1    ! reset the section ID to default
MAT,5 $ TYPE,5 $ REAL,6 $ SECNUM,5 $ ESYS,0    ! ELEMNODES = 4
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MAT,6 $ TYPE,6 $ REAL,5 $ SECNUM,6 $ ESYS,0    ! ELEMNODES = 4
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keyo,cid,8,2               ! auto create asymmetric contact (from Program Controlled setting)
keyo,cid,10,0              ! adjust contact stiffness each NR iteration (from Program Controlled setting)
keyo,cid,12,5              ! bonded always
keyo,cid,18,1              ! small sliding turned on by application
keyo,cid,2,0               ! augmented Lagrange (from Program Controlled setting)
keyo,cid,4,0               ! on Gauss point (from Program Controlled setting)
keyo,cid,9,1               ! ignore initial gaps/penetration
keyo,cid,7,0               ! No Prediction
rmod,tid,3,10.      ! FKN
rmod,tid,5,0.       ! ICONT
rmod,tid,6,0.       ! PINB
rmod,tid,10,0.      ! CNOF
rmod,tid,12,0.      ! FKT
rmod,tid,36,224     ! WB DSID
rmod,cid,3,10.      ! FKN
rmod,cid,5,0.       ! ICONT
rmod,cid,6,0.       ! PINB
rmod,cid,10,0.      ! CNOF
rmod,cid,12,0.      ! FKT
rmod,cid,36,224     ! WB DSID
*set,_maxkxx,1670000.
rmod,cid,14,_maxkxx/_ASMDIAG         ! TCC, Divide by Length since Traction Based
rmod,tid,14,_maxkxx/_ASMDIAG      ! TCC, Divide by Length since Traction Based
keyo,cid,1,2     ! Pure thermal contact
/com,*********** Create Contact "Bonded - epoxy_outer to phe1_inner" ***********
*set,tid,8
*set,cid,7
r,tid
r,cid
et,tid,170
et,cid,174
MAT,8 $ TYPE,8 $ REAL,8 $ SECNUM,8 $ ESYS,0    ! ELEMNODES = 4
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MAT,7 $ TYPE,7 $ REAL,7 $ SECNUM,7 $ ESYS,0    ! ELEMNODES = 4
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MAT,7 $ TYPE,7 $ REAL,8 $ SECNUM,7 $ ESYS,0    ! ELEMNODES = 4
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MAT,8 $ TYPE,8 $ REAL,7 $ SECNUM,8 $ ESYS,0    ! ELEMNODES = 4
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keyo,cid,8,2               ! auto create asymmetric contact (from Program Controlled setting)
keyo,cid,10,0              ! adjust contact stiffness each NR iteration (from Program Controlled setting)
keyo,cid,12,5              ! bonded always
keyo,cid,18,1              ! small sliding turned on by application
keyo,cid,2,0               ! augmented Lagrange (from Program Controlled setting)
keyo,cid,4,0               ! on Gauss point (from Program Controlled setting)
keyo,cid,9,1               ! ignore initial gaps/penetration
keyo,cid,7,0               ! No Prediction
rmod,tid,3,10.      ! FKN
rmod,tid,5,0.       ! ICONT
rmod,tid,6,0.       ! PINB
rmod,tid,10,0.      ! CNOF
rmod,tid,12,0.      ! FKT
rmod,tid,36,227     ! WB DSID
rmod,cid,3,10.      ! FKN
rmod,cid,5,0.       ! ICONT
rmod,cid,6,0.       ! PINB
rmod,cid,10,0.      ! CNOF
rmod,cid,12,0.      ! FKT
rmod,cid,36,227     ! WB DSID
*set,_maxkxx,1670000.
rmod,cid,14,_maxkxx/_ASMDIAG         ! TCC, Divide by Length since Traction Based
rmod,tid,14,_maxkxx/_ASMDIAG      ! TCC, Divide by Length since Traction Based
keyo,cid,1,2     ! Pure thermal contact
/com,*********** Create Contact "Bonded - phe1_outer to aluminium_inner" ***********
*set,tid,10
*set,cid,9
r,tid
r,cid
et,tid,170
et,cid,174
MAT,10 $ TYPE,10 $ REAL,10 $ SECNUM,10 $ ESYS,0    ! ELEMNODES = 4
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MAT,9 $ TYPE,9 $ REAL,9 $ SECNUM,9 $ ESYS,0    ! ELEMNODES = 4
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MAT,9 $ TYPE,9 $ REAL,10 $ SECNUM,9 $ ESYS,0    ! ELEMNODES = 4
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MAT,10 $ TYPE,10 $ REAL,9 $ SECNUM,10 $ ESYS,0    ! ELEMNODES = 4
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keyo,cid,8,2               ! auto create asymmetric contact (from Program Controlled setting)
keyo,cid,10,0              ! adjust contact stiffness each NR iteration (from Program Controlled setting)
keyo,cid,12,5              ! bonded always
keyo,cid,18,1              ! small sliding turned on by application
keyo,cid,2,0               ! augmented Lagrange (from Program Controlled setting)
keyo,cid,4,0               ! on Gauss point (from Program Controlled setting)
keyo,cid,9,1               ! ignore initial gaps/penetration
keyo,cid,7,0               ! No Prediction
rmod,tid,3,10.      ! FKN
rmod,tid,5,0.       ! ICONT
rmod,tid,6,0.       ! PINB
rmod,tid,10,0.      ! CNOF
rmod,tid,12,0.      ! FKT
rmod,tid,36,230     ! WB DSID
rmod,cid,3,10.      ! FKN
rmod,cid,5,0.       ! ICONT
rmod,cid,6,0.       ! PINB
rmod,cid,10,0.      ! CNOF
rmod,cid,12,0.      ! FKT
rmod,cid,36,230     ! WB DSID
*set,_maxkxx,1670000.
rmod,cid,14,_maxkxx/_ASMDIAG         ! TCC, Divide by Length since Traction Based
rmod,tid,14,_maxkxx/_ASMDIAG      ! TCC, Divide by Length since Traction Based
keyo,cid,1,2     ! Pure thermal contact
nsel,all
esel,all
fcum,add                   ! add nodal forces up (needed in case have loads on the same edge,vertex)
fcum                       ! reset default on fcum command since done sending WB F loads
ALLSEL,ALL
TUNIF,22.0
FINISH
