Rocket 3
0.0                      Mach
0      0      0.0        iYsym  iZsym  Zsym
125.66370614359172    4    4        Sref   Cref   Bref
0.0    0.0    0.0        Xref   Yref   Zref
0.45

#
#=============================================
BODY
Fuselage
30  1.0

TRANSLATE
0.0  0.0  0.0

BFIL
fuse_+.dat

#=============================================
SURFACE
Horizontal Fins
23  1.0   ! Nchord Cspace
YDUPLICATE
0.0

SCALE
1.0  1.0  1.0
TRANSLATE
53.9  2.0  0.0
SECTION
    0        0        0.0        6.1        0.0      11   1.0
NACA
0007
SECTION
    1.8719999999999997        2.08        0.0        4.228        0.0      15   1.0
NACA
0007
CONTROL
delta_a -57.29577951308232 0.6452223273415326 0.0 1.0 0.0 -1.0 ! name , gain , Xhinge , XYZhvec , SgnDup
CONTROL
delta_e -57.29577951308232 0.6452223273415326 0.0 1.0 0.0 1.0 ! name , gain , Xhinge , XYZhvec , SgnDup
SECTION
    4.571999999999999        5.08        0.0        1.5280000000000005        0.0      -8   1.0
NACA
0007
CONTROL
delta_a -57.29577951308232 0.0183246073298432 0.0 1.0 0.0 -1.0 ! name , gain , Xhinge , XYZhvec , SgnDup
CONTROL
delta_e -57.29577951308232 0.0183246073298432 0.0 1.0 0.0 1.0 ! name , gain , Xhinge , XYZhvec , SgnDup
SECTION
    3.1499999999999995        3.5        0.0        2.95        0.0      0   1.0
NACA
0007


#=============================================
SURFACE
Vertical Fin Top
23  1.0   ! Nchord Cspace

SCALE
1.0  1.0  1.0
TRANSLATE
53.9  0.0  2.0
SECTION
    0        0.0        0       6.1        0.0      11   1.0
NACA
0007
SECTION
    1.8719999999999997        0.0        2.08       4.228        0.0      15   1.0
NACA
0007
CONTROL
delta_a -57.29577951308232 0.6452223273415326 0.0 0.0 1.0 -1.0 ! name , gain , Xhinge , XYZhvec , SgnDup
CONTROL
delta_r 57.29577951308232 0.6452223273415326 0.0 0.0 1.0 1.0 ! name , gain , Xhinge , XYZhvec , SgnDup
SECTION
    4.571999999999999        0.0        5.08       1.5280000000000005        0.0      -8   1.0
NACA
0007
CONTROL
delta_a -57.29577951308232 0.0183246073298432 0.0 0.0 1.0 -1.0 ! name , gain , Xhinge , XYZhvec , SgnDup
CONTROL
delta_r 57.29577951308232 0.0183246073298432 0.0 0.0 1.0 1.0 ! name , gain , Xhinge , XYZhvec , SgnDup
SECTION
    3.1499999999999995        0.0        3.5       2.95        0.0      0   1.0
NACA
0007


#=============================================
SURFACE
Vertical Fin Bottom
23  1.0    ! Nchord Cspace

SCALE
1.0  1.0  1.0
TRANSLATE
53.9  0.0  -2.0
SECTION
    0        0.0        0       6.1        0.0      11   1.0
NACA
0007
SECTION
    1.8719999999999997        0.0        -2.08       4.228        0.0      15   1.0
NACA
0007
CONTROL
delta_a 57.29577951308232 0.6452223273415326 0.0 0.0 1.0 -1.0 ! name , gain , Xhinge , XYZhvec , SgnDup
CONTROL
delta_r 57.29577951308232 0.6452223273415326 0.0 0.0 1.0 1.0 ! name , gain , Xhinge , XYZhvec , SgnDup
SECTION
    4.571999999999999        0.0        -5.08       1.5280000000000005        0.0      -8   1.0
NACA
0007
CONTROL
delta_a 57.29577951308232 0.0183246073298432 0.0 0.0 1.0 -1.0 ! name , gain , Xhinge , XYZhvec , SgnDup
CONTROL
delta_r 57.29577951308232 0.0183246073298432 0.0 0.0 1.0 1.0 ! name , gain , Xhinge , XYZhvec , SgnDup
SECTION
    3.1499999999999995        0.0        -3.5       2.95        0.0      0   1.0
NACA
0007
